# Bsp 5.97)
# Hauptbedingung:
#
# V(x)= (a-2x)*(b-2x)*x
#
# Nebenbedingung (nicht nötig):
# 2*ax+2*bx+(a-2x)*(a-2x)
# Maße A3 und A4 in mm:
# A4: | A3:
a_1 := 210
a_2 := 420
b_1 := 297
b_2 := 297
V_1(x) := (a_1 - 2*x)*(b_1 - 2*x)*x
V_2(x) := (a_2 - 2*x)*(b_2 - 2*x)*x
# Ableitungen:
V'_1(x) := d/dx(V_1(x)) → 12*x^2 - 2028*x + 62370
V'_2(x) := d/dx(V_2(x)) → 12*x^2 - 2868*x + 124740
# x1 und x2:
x_1 := V'_1(x_1) solve, x_1; float, 5 → [128.58; 40.423]
x_1 := x_1[1]
x_2 := V'_2(x_2) solve, x_2; float, 5 → [181.83; 57.168]
x_2 := x_2[1]
# Das Maximale Volumen beim A4  kann bei einer Länge von x_1 → 40.423mm erreicht werden.
# -------------------------------------------------------------------------------
# Das Maximale Volumen beim A3  kann bei einer Länge von x_2 → 57.168mm erreicht werden.
# Verhältnis
v := V_2(x_2)/V_1(x_1) float, 3 → 2.83
# Die beiden Seitenlängen stehen in einem Verhältnis von 1 zu v → 2.83 also 1 : 2,82.
