# 2.5.3 Extremwertaufgaben
#
# Bei Extremwertaufgaben werden absolute Extremwerte einer Funktion unter bestimmten Bedingungen bestimmt. Unter einem absoluten Extremwert versteht man dabei jenen Wert der den größten bzw kleinsten Fuktionswert in einem Intervall besitzt.
#
# Bei Extremwertaufgaben unterscheidet man zwischen Haupt und Nebenbedingungen.
#
# Dabei ist die Hauptbedingung das Maximum oder Minimum.
#
# Die Nebenbedingungen beziehen sich auf di vorgegebenen Bedingungen und dienen zur Reduktion der Variablen.
# Beispiel  1:
#
# Mit einem Gartenzaun von 40 dm soll ein Haus mit größtmöglichem Flächeninhalt eingezäunt werden.
# Berechnen Sie die Abmessungen des Obstgartens.
# Lösung Hauptbedingung
A(x, y) := x*y
X := 40 == 2*x + y solve, x → (-y + 40)/2
A(y) := A(X, y) → y*(-y + 40)/2
A'(y) := d/dy(A(y)) → -y + 20
Y := A'(y) solve, y → 20
A''(y) := d/dy(A'(y)) → -1
X := 10
# Die Abmessungen des Zaunes sind x=10dm und y=20dm und der Flächeninhalt beträgt 200dm.
Fläche := X*Y → 200
clear(A, y, x, X, Y, A'')
# 3.94a)
A(x, y) := x*y
X := 60 == 2*x + y solve, x → (-y + 60)/2
A(y) := A(X, y) → y*(-y + 60)/2
A'(y) := d/dy(A(y)) → -y + 30
Y := A'(y) solve, y → 30
A'(y) := d/dy(A(y)) → -y + 30
A''(y) := d/dy(A'(y)) → -1
x(Y) := (-30 + 60)/2 → 15
A := x(Y)*Y → 450
# Die Abmessungen des Zaunes sind x=15dm und y=30dm und der Flächeninhalt beträgt 450dm^2.
