# Beispiel  5.38 1-3, 5.44c, 5.57, 5.59 1-4, 5.60 1-3
# 5.38)1-3)
f(x) := 1/32*x^4 - 3/4*x^2 + 7.5 → 0.03125*x^4 + (7.5 - 1.0*0.75*x^2)
f'(x) := d/dx(f(x)) → 0.125*x^3 - 1.5*x
f''(x) := d/dx(f'(x)) → 0.375*x^2 - 1.5
# root-Befehl liefert nummerische Lösungen
root(x)
g(x) := 1.5*x^2 - 1
W := f''(x) == 0 solve, x; assume, x == real → [2.0; -2.0]
W_1 := [2; f(W[0])] → [2; 5.0]
W_2 := [W[1]; f(W[1])] → [-2.0; 5.0]
# Graphische Darstellung
# [plot: f(x), g(x), W_1[1], W_2[1] vs x, W_1[0], W_2[0]]
# Höhe) | Breite)
h := f(0) - g(0) → 8.5
b := W_1[0] - W_2[0] → 4.0
# Beispiel 5.44c)
f(x) := (x - 1)/(x^2 - 4)
f'(x) := d/dx(f(x)) → (-x^2 + 2*x - 4)/(x^4 - 8*x^2 + 16)
f''(x) := d/dx(f'(x)) → (2*x^3 - 6*x^2 + 24*x - 8)/(x^6 - 12*x^4 + 48*x^2 - 64)
f'''(x) := d/dx(f''(x)) → (-(6*x^4) + 24*x^3 - 144*x^2 + 96*x - 96)/(x^8 - 16*x^6 + 96*x^4 - 256*x^2 + 256)
# Definitionsmenge
D := x^2 - 4 == 0 solve, x → [2; -2]
# D=R/{-2,2}, Die Unstetigkeitsstellen sind Polstellen also hat die Funktion Polstellen bei: x1= 2, x2=-2
# Noch dazu ist die Funktion nicht stetig und hat keine Lücken.
# senkrechte Asymptoten bei
x_1 := D[0] → 2
x_2 := D[1] → -2
# Schräge Asymptote, wo das x im Nenner nicht vorkommt.
# schräge Asymptoten bei
A(x) := f(x) → (x - 1)/(x^2 - 4) parfrac; expand → 1/(4*x - 8) + 3/(4*x + 8)
a_s := limit(A(x), x → ∞) → 0
# Verhalten an der Unstetigkeitsstellen
limit(f(x), x → 2+) → ∞
limit(f(x), x → 2-) → -∞
limit(f(x), x → -2+) → ∞
limit(f(x), x → -2-) → -∞
# Verhalten im Unendlichen
limit(f(x), x → ∞) → 0
limit(f(x), x → -∞) → 0
# Nullstellen der Funktion
N_ALL := f(x) == 0 solve, x; assume, x == real → 1
N_1 := [N_ALL; 0] → [1; 0]
# Extremstelen der Funktion
E := f'(x) == 0 solve, x → [-(sqrt(3)*1i) + 1; sqrt(3)*1i + 1]
# keine Extremstellen
# Wendestellen
W := f''(x) == 0 solve, x; assume, x == real → 0.362165747256
W_1 := [f(W); W] → [0.164864640797; 0.362165747256]
# Wendetangenten
k := f'(W) → -0.227609377814
d := W_1[0] == k*W + d solve, d → 0.247296961195
t(x) == k*x + d → t(x) == -0.227609377814*x + 0.247296961195
# Monotonie
# streng monoton fallend: ]-2, 2 .. □[ und ]-∞, 2 .. □[ und ]2, ∞ .. □[
# Grafik
# [plot: f(x) vs x, x_1, x_2]
# Beispiel 5.57)
f(x) := 1/sqrt(2*π)*e^(-(x^2/2)) → sqrt(2)*e^(-x^2/2)/(2*sqrt(π))
f'(x) := d/dx(f(x)) → -(x*sqrt(2*π)*e^(-x^2/2))/(2*π)
f''(x) := d/dx(f'(x)) → (x^2 - 1)*sqrt(2*π)*e^(-x^2/2)/(2*π)
# Definitionsbereich
# D=R
# Es handelt sich um eine stetige Funktion.
# Es sind keine Polstellen vorhanden. Die Funktion hat keine Lücken.
# Asymptotisches Verhalten
limit(f(x), x → ∞) → 0
limit(f(x), x → -∞) → 0
# Nullstellen
N := f(x) == 0 solve, x → 33.1843604271
# keine Nullstellen
# Extremstellen
E := f'(x) == 0 solve, x; assume, x == real → 0
f''(E) → -sqrt(2)/(2*sqrt(π))
H := [E; f(E)] → [0; sqrt(2)/(2*sqrt(π))]
# Wendestellen
W := f''(x) == 0 solve, x; assume, x == real → [1; -1]
W_1 := [W[0]; f(W[0])] → [1; sqrt(2)/(2*sqrt(π)*sqrt(e))]
W_2 := [W[1]; f(W[1])] → [-1; sqrt(2)/(2*sqrt(π)*sqrt(e))]
# Wendetangenten
k_1 := f'(W[0]) → -sqrt(2)/(2*sqrt(π)*sqrt(e))
k_2 := f'(W[1]) → sqrt(2)/(2*sqrt(π)*sqrt(e))
d_1 := W_1[1] == k_1*W_1[0] + d_1 solve, d_1 → sqrt(2)/(sqrt(π)*sqrt(e))
d_2 := W_2[1] == k_2*W[1] + d_2 solve, d_2 → sqrt(2)/(sqrt(π)*sqrt(e))
t_1(x) := k_1*x + d_1 → -sqrt(2)*x/(2*sqrt(π)*sqrt(e)) + sqrt(2)/(sqrt(π)*sqrt(e))
t_2(x) := k_2*x + d_2 → sqrt(2)*x/(2*sqrt(π)*sqrt(e)) + sqrt(2)/(sqrt(π)*sqrt(e))
# Monotonie
# streng monoton steigend: ]-3,0[
# streng monoton  fallend : ]0,3[
# Graphische Darstellung im Intervall von [-3,3]
# [plot: f(x), N_1[0], H[1], W_1[1], W_2[1], t_1(x), t_2(x) vs x, N_1[1], H[0], W_1[0], W_2[0]]
# 5.59 1-4
K(t) := 6*(e^(-0.11*t) - e^(-0.5*t))
K'(t) := d/dt(K(t)) → -0.66*e^(-0.11*t) + 3.0*e^(-0.5*t)
K''(t) := d/dt(K'(t)) → 0.0726*e^(-0.11*t) - 1.5*e^(-0.5*t)
# 1)
E := K'(t) == 0 solve, t → 3.88237880161
K''(E) → -0.167933761855
H := [E; K(E)] → [3.88237880161; 3.05334112464]
# Die ist bei 3.88h Maximal mit 3.05mg/L
# 2) Abhame am stärksten
W := K''(t) == 0 solve, t → 7.76475760323
# Die Abnahme der Konzentration ist bei 7.76h am stärksten.
# 3) 30% der max Konzentration
p_y := H[1]/100*30 → 0.916002337391  # A: nach 17.07 stunden betragt die Konzentration 0.92 mg/L. Dies entspricht 30% der Maximalen Konzentration.
p_x := root(K(x) - p_y, x, 5, 50) = 17.0747
P := [p_x; p_y] → [17.0746611998; 0.916002337391]
# 4) K für t gegen unendlich
limit(K(t), t → ∞) → 0.0  # Für den unendlichen Bereich nähert sich die Funktion 0.
# 5.60)
y(t) := 0.06*e^(-4*t) - 0.06*e^(-8*t)
y'(t) := d/dt(y(t)) → -0.24*e^(-4.0*t) + 0.48*e^(-8.0*t)
y''(t) := d/dt(y'(t)) → 0.96*e^(-4.0*t) - 3.84*e^(-8.0*t)
# Definitionsbereich, Polstellen, Stetigkeit, gerade/ungerade
# D = R
# Keine Polstellen,
# Keine Wendepunkte
# gerade
# stetig
# Nullstellen
N_1 := [N; y(N)] → [33.1843604271; 0.13521123341*10^-58]
N := y(t) == 0 solve, t; assume, t == real → 0.0
# Asymptotisches Verhalten
limit(y(t), t → ∞) → 0.0
limit(y(t), t → -∞) → -∞
# Extremstellen
E := y'(t) == 0 solve, t; assume, t == real → 0.17328679514
y''(E) → -0.48
H := [E; y(E)] → [0.17328679514; 0.015]
# Wendestellen, Wendetangenten
W := y''(t) == 0 solve, t; assume, t == real → 0.34657359028
W_1 := [W; y(W)] → [0.34657359028; 0.01125]
k := y'(W) → -0.03
d_t := W_1[1] == k*W_1[0] + d_t solve, d_t; assume, d_t == real → 0.0216472077084
t(x) := k + x + d_t → x - 0.0083527922916
# 2)
# Die erste Ableitung gibt die Momentangeschwindigkeit an einem gewissen Punkt an.
# 3)
# Die t-Koordinate gibt die Maximale Auslenkung an und die y-Koordinate gibt den Maximalen Abstand der Ruhelage an.
