# Bsp 5.44c)
f(x) := (x - 1)/(x^2 - 4)
f'(x) := d/dx(f(x)) → (-x^2 + 2*x - 4)/(x^4 - 8*x^2 + 16)
f''(x) := d/dx(f'(x)) → (2*x^3 - 6*x^2 + 24*x - 8)/(x^6 - 12*x^4 + 48*x^2 - 64)
f'''(x) := d/dx(f''(x)) → (-(6*x^4) + 24*x^3 - 144*x^2 + 96*x - 96)/(x^8 - 16*x^6 + 96*x^4 - 256*x^2 + 256)
# Definitionsbereich, Stetigkeit, Lücken, Asymptoten
# Definitionsbereich
D := x^2 - 4 solve, x → [2; -2]
# D = R/{-2,2}, Unstetigkeitsstellen bei: x_1=2 und x_2=-2, Der Zähler ist an den Unstetigkeitsstellen != 0 daher handelt es sich hier um senkrechte Asymptoten
# Senkrechte Asymptoten: | Schräge Asymptoten
x_1 := D[0] → 2
A(x) := f(x) parfrac; expand → 1/(4*x - 8) + 3/(4*x + 8)
x_2 := D[1] → -2
a_s := limit(A(x), x → ∞) → 0
# Verhalten an Unstetigkeitsstellen
limit(f(x), x → 2+) → ∞
limit(f(x), x → -2+) → ∞
limit(f(x), x → 2-) → -∞
limit(f(x), x → -2-) → -∞
# Verhalten im Unendlichen
limit(f(x), x → ∞) → 0
limit(f(x), x → -∞) → 0
# Nullstellen
N_ALL := f(x) == 0 solve, x; assume, x == real → 1
N_1 := [N_ALL; 0] → [1; 0]
# Extremstellen
E_ALL := f'(x) == 0 solve, x → [-(sqrt(3)*1i) + 1; sqrt(3)*1i + 1]
f'(x) == 0 solve, x → [-(sqrt(3)*1i) + 1; sqrt(3)*1i + 1]  # keine Extremstellen
f''(E_ALL[0]) = 0.0625 + 0.0360844i
# Wendestellen
W := f''(x) == 0 solve, x; assume, x == real → 0.362165747256
W_1 := [W; f(W)] → [0.362165747256; 0.164864640797]
# Monotonie
# streng monton falled ]-∞,-2[ und ]2, ∞ .. □[ und ]-2, 2 .. □[
# [plot: f(x), a_s vs x, x_1, x_2]
# nicht symmetrisch
# 5.19)
y(x) := -0.37*x^4 + 3.14*x^3 - 7.7*x^2 + 5.32*x
y'(x) := d/dx(y(x)) → -1.48*x^3 + 9.42*x^2 - 15.4*x + 5.32
y''(x) := d/dx(y'(x)) → -4.44*x^2 + 18.84*x - 15.4
# [plot: y(x) vs x]
y''(4) = -11.08
y''(2) = 4.52
y''(0.5) = -7.09
# (A): Das Schild muss vor Kurve 3 platziert werden.
# 5.31)
h(x) := -0.116*x^2 + 0.781*x + 2.6
# [plot: h(x) vs x]
h'(x) := d/dx(h(x)) → -0.232*x + 0.781
h''(x) := d/dx(h'(x)) → -0.232
# Max. Sprunghöhe & Max Sprungweite
E_ALL := h'(x) == 0 solve, x → 3.36637931034
E := [E_ALL; h(E_ALL)] → [3.36637931034; 3.91457112069]
# (A): Die Maximal erreichte Springhöhe liegt bei: 3.91m
N_ALL := h(x) == 0 solve, x → [-2.44277749289; 9.17553611358]
N_1 := [N_ALL[0]; 0] → [-2.44277749289; 0]
N_2 := [N_ALL[1]; 0] → [9.17553611358; 0]
# (A): Die maximale Sprungweite liegt im Intervall von [0,10] bei 9.18m.
# 3) Winkel mit dem die Maschine am Boden aufkommt.
h'(N_2[0]) → -1.34772437835  # Mithilfe von TR gelöst
# arctan(h'(N_2[0]))= -53.42deg
# Der Steigungswinkel berechnet sich durch α = arctan(f'(x))
# Lösung teils Ident mit dem Lösungsheft: Meine: -53.42 deg, Lösungsheft: 53.42 deg
# Wendepunkte
# Die Funktion hat keinen Wendepunkt, da die zweite Ableitung eine Gerade ist.
