# Beispiel 1
1 + 1 = 2
1.1 + 2.1 = 3.2
nthroot(2, 7) + nthroot(7, 5) → 7^(1/5) + 2^(1/7) = 2.57986
17 - 5 = 12
7/2 = 3.5
2^7 = 128
|-5| = 5
f(x) := 3*x + 5
f(sqrt(2)) → 3*sqrt(2) + 5 = 9.24264
h(x) := 3*x^2 - 4*x - 5
f(x) == 0 solve, x → -5/3
f(x) == 3 solve, x → -2/3
# Funktion g(x)
g(x) := 3*x^2 - 4*x + 5
α := 60 deg = 1.0472
cos(α) = 0.5
cos(γ1) == 0.4 solve, γ1 → [1.15927948073; -1.15927948073] = [66.4218; -66.4218] deg
x_1 := 5
x_2 := 6
x_1 + x_2 = 11
g(x_1) = 60
x_6 := 6
p(x) := 3*x - 5
m(x) := 3*x^2 - 4*x + 5
# [plot: g(x), f(x) vs x]
# Schnittpunkt
S := g(x) == f(x) solve, x → [0; 7/3]
S_1 := [S[0]; f(S[0])] → [0; 5]
S_2 := [S[1]; f(S[1])] → [7/3; 12]
# [plot: f(x), g(x), S_1[1], S_2[1] vs x, S_1[0], S_2[0]]
