# Beispiel 2 am 5.24
f(x) := -1/3*(x^4 - 8*x^2 - 3) → (-x^4 + 8*x^2 + 3)/3
# Lösung
f'(x) := d/dx(f(x)) → (-(4*x^3) + 16*x)/3
# STRG + SHIFT + D
f''(x) := d/dx(f'(x)) → -(4*x^2) + 16/3
f'''(x) := d/dx(f''(x)) → -(8*x)
# (1) Definitionsmenge, Lücken, Polstellen, Lücken
# D=R, Stetig, Keine Polstellen
# 2) Asymptoten verhalten
# STRG + L = Limes
limit(f(x), x → ∞) → -∞  # STRG + SHIFT + Z = unendlich
# 3) Nullstellen
N := f(x) == 0 solve, x; assume, x == real → [sqrt(sqrt(19) + 4); -sqrt(sqrt(19) + 4)]
N_1 := [N[0]; 0] = [2.89118; 0]
N_2 := [N[1]; 0] = [-2.89118; 0]
# Extremstellen
E := f'(x) == 0 solve, x → [0; 2; -2]
T1 := [E[0]; f(E[0])] = [0; 1]
f''(E[0]) → 16/3
f''(E[1]) → -32/3
H1 := [E[1]; f(E[1])] → [2; 19/3]
H2 := [E[2]; f(E[2])] → [-2; 19/3]
# (5) Wendestellen, Wendetangenten
W := f''(x) == 0 solve, x → [-(2*sqrt(3))/3; 2*sqrt(3)/3]  # Graph kann mit STRG + 2 erstellt werden
# Wendetangente
W_1 := [W[0]; f(W[0])] → [-(2*sqrt(3))/3; 107/27]
k_1 := f'(W[0]) = -4.1056
k_2 := f'(W[1]) = 4.1056
W_2 := [W[1]; f(W[1])] → [2*sqrt(3)/3; 107/27]
k_1 = -4.1056
d_1 := W_1[1] == k_1*W_1[0] + d_1 solve, d_1 → -0.777777777778
d_2 := W_2[1] == k_2*W_2[0] + d_2 solve, d_2 → -0.777777777778
t_1(x) := k_1*x + d_1
t_2(x) := k_2*x + d_2
# Krümmung
# Linksgekrümmt
f''(x) > 0
f''(x) < 0
# (6) Monotonie
f'(x) > 0  # Monoton steigend f'(x) > 0
# Streng Monoton steigend: ]-∞, -2 .. □[ und ] 0,2 [
# streng monoton fallend: ]-2,0[ und ]2,∞[
# Monoton fallend f'(x) < 0
# mit STRG +SHIFT + M
# nomarlen Bereich im Mathcad
# Grafik
# [plot: f(x), t_1(x), t_2(x), W_1[1], W_2[1] vs x, W_1[1], W_2[1]]
