# 5.102)
# Lösung:
# Hauptbedingung: T(b,h)=b*h² -> MAX
# Nebenbedingung: d=sqrt(h^2 + b^2)
T(b, h) := b*h^2
H(b) := 65 == sqrt(h^2 + b^2) solve, h → [sqrt(-b^2 + 4225); -sqrt(-b^2 + 4225)]
T(b) := T(b, H(b)) → [b*(-b^2 + 4225); b*(-b^2 + 4225)]
T(b) := T(b)[0] → b*(-b^2 + 4225)
T'(b) := d/db(T(b)) → -(3*b^2) + 4225
T''(b) := d/db(T'(b)) → -(6*b)
B := T'(b) == 0 solve, b → [-(65*sqrt(3))/3; 65*sqrt(3)/3] = [-37.5278; 37.5278]
T''(B) → [225.166604984; -225.166604984]
B := B[1]
H := H(B) → [53.0722777603; -53.0722777603] = [53.0723; -53.0723]
# Die Breite b und die Höhe h müssten b=37,53cm und h=53,07cm betragen um die größte Tragfähigkeit zu erreichen
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# 5.105)
# Lösung:
# Hauptbedingung: K(x,y)=(8-x)*10.000+y*30.000 -> MIN
# Nebenbedingung: 1=sqrt(y^2 - x^2)
K(x, y) := (8 - x)*10000 + y*30000
Y(x) := 1 == sqrt(y^2 - x^2) solve, y → [sqrt(x^2 + 1); -sqrt(x^2 + 1)]
K(x) := K(x, Y(x)) → [30000*sqrt(x^2 + 1) + (80000 - 10000*x); -(30000*sqrt(x^2 + 1)) + (80000 - 10000*x)]
K(x) := K(x)[0] → 30000*sqrt(x^2 + 1) + (80000 - 10000*x)
K'(x) := d/dx(K(x)) → 30000*x/sqrt(x^2 + 1) - 10000
K''(x) := d/dx(K'(x)) → 30000/((x^2 + 1)*sqrt(x^2 + 1))
X := K'(x) == 0 solve, x → sqrt(2)/4
K''(X) → 160000*sqrt(2)/9 = 25141.6
X float, 6 → 0.353553
# Die länge von x müsste 0,35km bzw 353,55m betragen und der Abstand von T zum Abzweigungspunkt A somit 7,65km um die geringsten Kosten zu bekommen.
Y(X) → [3*sqrt(2)/4; -(3*sqrt(2))/4]
Y(X)[0] = 1.06066
8 - X = 7.64645
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# Beispiel 9 Arbeitsblatt 2.3 Extremwertaufgaben
# Lösung:
# Hauptbedingung: T(b,h)=1/σ*b*h^² -> MAX
# Nebenbedingung: d=sqrt(h^2 + b^2)
T(b, h) := 1/σ*b*h^2
H(b) := d == sqrt(h^2 + b^2) solve, h → [sqrt(d^2 - b^2); -sqrt(d^2 - b^2)]
T(b) := T(b, H(b)) → [b*(d^2 - b^2)/σ; b*(d^2 - b^2)/σ]
T(b) := T(b)[0] → b*(d^2 - b^2)/σ
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T'(b) := d/db(T(b)) → (d^2 - 3*b^2)/σ
T''(b) := d/db(T'(b)) → -(6*b)/σ
B := T'(b) == 0 solve, b → [-sqrt(3*d^2)/3; sqrt(3*d^2)/3]
T''(B) → [2*sqrt(3)*sqrt(d^2)/σ; -(2*sqrt(3)*sqrt(d^2))/σ]
d := 46
B := B[1] → sqrt(3)*sqrt(d^2)/3
H := H(B) → [sqrt(-2116/3 + d^2); -sqrt(-2116/3 + d^2)] = [37.5588; -37.5588]
B = 26.5581
sqrt(3)*sqrt(d^2)/3 == d/sqrt(3) → 1
sqrt(-2116/3 + d^2) == d*sqrt(2)/sqrt(3) → 1
# Allgemein gilt für die Breite: b =d/sqrt(3)
# Allgemein gilt für die Höhe: h =d*sqrt(2)/sqrt(3)
# Bei einem Durchmesser von d=46cm müssten die Breite b und die Höhe h b=26,56cm und h=37,56cm betragen um die größte Tragfähigkeit zu erreichen.
# Beispiel 10 Arbeitsblatt 2.3 Extremwertaufgaben
# Lösung:
# Hauptbedingung: A(r,l)=π*r²+l*(2*r) -> MAX
# Nebenbedingung: U=π*r+2*l+2*r
A(r, l) := π*r^2/2 + l*(2*r)
L(r) := U == π*r + 2*l + 2*r solve, l → (-(r*π) + (U - 2*r))/2
A(r) := A(r, L(r)) → r^2*π/2 + r*(U - 2*r - r*π)
A'(r) := d/dr(A(r)) → -(r*π) + (U - 4*r)
A''(r) := d/dr(A'(r)) → -π - 4
R := A'(r) == 0 solve, r → U/(π + 4)
A''(R) → -π - 4
B := R*2 → 2*U/(π + 4)
# Die Breite und Höhe des Fensters müssten b=2*U/(π + 4) und h=2*U/(π + 4)sein.
L(R) + R simplify → 2*U/(π + 4)
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