# 2.5.2 Umkehraufgaben)
# Sie dienen zum Auffinden von Funktionen aus vorgegebenen Bedingungungen.
#
# Polynomfunktion 2. Grades: f(x)=ax^2+bx+c
# Polynomfunktion 3. Grades bzw. kubische Funktion: f(x): a*x^(3^□) + b*x^(2^□) + c*x + d
# Beispiel 5.70)
f(x) := a*x^3 + b*x^2 + c*x + d  # error: Diese Variable ist nicht definiert. Prüfen Sie, ob die Beschriftung richtig festgelegt ist.
P := [2; 6]
Q := [8; 5]
T := [12; y_T]  # error: Diese Variable ist nicht definiert. Prüfen Sie, ob die Beschriftung richtig festgelegt ist.
# Lösung:
# Bedingungen:
# I: f(2) = 6
# II: f(8) = 5
# III: f''(8) = 0
# IIII: f'(12) = 0
f'(x) := d/dx(f(x)) → 3*a*x^2 + 2*b*x + c
f''(x) := d/dx(f'(x)) → 6*a*x + 2*b
# shift + space = zeile
[a, b, c, d] := [f(2) == 6; f(8) == 5; f''(8) == 0; f'(12) == 0] → [d + 2*c + 4*b + 8*a == 6; d + 8*c + 64*b + 512*a == 5; 2*b + 48*a == 0; c + 24*b + 432*a == 0] solve, a, b, c, d → [1/72, -1/3, 2, 29/9]
f(x) := a*x^3 + b*x^2 + c*x + d → x^3/72 + (29/9 + 2*x - x^2/3)
f(12) → 29/9
T := [12; f(12)] → [12; 29/9]
# Grafik
# [plot: f(x) vs x]
# 5.70) 3)
# Ablesen: zwischen 4
H := [4; f(4)] → [4; 61/9]
# Durch das Ablesen aus der Graphik lässt sich der Hochpunkt bestimmen bzw . da man weiß, dass eine Polynomfunktion dritten Grades um den Wendepunkt punksymmetrisch ist, erhält man den Hochpunkt bei x = 4 und er lautet insgesamt H → [4; 61/9]- der Abstand vom Wendepunkt zum Hochpunkt ist gleich.
clear(a, b, c, d, f)
# Beispiel 5.71)
f(x) := a*x^3 + b*x^2 + c*x + d  # error: Diese Variable ist nicht definiert. Prüfen Sie, ob die Beschriftung richtig festgelegt ist.
P := [4; 6]
W := [11; y_W]  # error: Diese Variable ist nicht definiert. Prüfen Sie, ob die Beschriftung richtig festgelegt ist.
# Bedingungen
# I: f(4) = 6
# II: f'(4) = 0 (waagrechte Tangente)
# III: f''(11) = 0
# IIII: f(0) = 0
f'(x) := d/dx(f(x)) → 3*a*x^2 + 2*b*x + c
f''(x) := d/dx(f'(x)) → 6*a*x + 2*b
[a, b, c, d] := [f4 == 6; f'(4) == 0; f''(11) == 0; f(0) == 0] → [f4 == 6; c + 8*b + 48*a == 0; 2*b + 66*a == 0; d == 0] solve, a, b, c, d → {
    if f4 == 6
        [0, 0, 0, 0]
    else
        undefined
}
