# 5.101
# Hauptbedingung:
# Vz (x,y) = 2y*π *x^2
# Nebenbedingung:
# R^2= x^(2^□)+ y^2
V_z(x, y) := 2*y*π*x^2 → 2*x^2*y*π
Y := R^2 == x^2 + y^2 solve, x → [-sqrt(-y^2 + R^2); sqrt(-y^2 + R^2)]
V(y) := V_z(Y[0], y) → y*π*(-(2*y^2) + 2*R^2)
V'(x) := d/dy(V(y)) → (-(6*y^2) + 2*R^2)*π
Z := V'(y) == 0 solve, y; assume, R > 0 → [-sqrt(12*R^2)/6; sqrt(12*R^2)/6]
y_1 := Z[1] simplify; assume, R > 0 → sqrt(3)*R/3
x_1 := R^2 == x_1^2 + y_1^2 solve, x_1 → [-sqrt(6*R^2)/3; sqrt(6*R^2)/3]
V_max := V_z(x_1[1], y_1) → 4*sqrt(3)*R^3*π/9
R := 5
V_Kegel := (4*π*R^2)/3
(V_max*100)/V_Kegel → 4*sqrt(3)*R^3/3  # Meine Lösung ist falsch.
100 - V_max*100/V_Kegel → -4*sqrt(3)*R^3/3 + 100 = -188.675
# Richtig wäre: Es fallen 42.26% des Kugelvolumens weg.
