# 5.44b)
# Lücken oder Polstellen, Definitionsberreich
# Eine Lücke ist dann wenn der Zähler und Nenner 0 sind
f(x) := x^2/(x^2 - 1)
# D = R/{-1,1} nicht stetig
# Unstätigkeitsstellen bei x1= 1 und x2 = -1
# Da der Zähler an den unstetigkeitsstellen != 0 ist (jeweils 1) handelt es sich bei den Unstetigkeitsstellen um Polstellen --> senkrechte Asympthoten
# Definitonsbereich
x^2 - 1 solve, x → [1; -1]
# (2) Asymptoten Verhalten in der Unendlichkeit, Verhalten an Unstetigkeitsstellen
# Senkrechte Asymptoten | Schräge Asymptoten
x_1 := 1
x_2 := -1  # Polynomdivision
A(x) := f(x) parfrac; expand → 1/(2*x - 2) - 1/(2*x + 2) + 1
limit(A(x), x → ∞) → 1
a_s := 1
# Verhalten an den Unstetigkeitsstellen
limit(f(x), x → 1+) → ∞
limit(f(x), x → 1-) → -∞
limit(f(x), x → -1+) → -∞
limit(f(x), x → -1-) → ∞
# Verhalten im Unendlichen
limit(f(x), x → ∞) → 1
limit(f(x), x → -∞) → 1
# Nullstellen
N_ALL := f(x) == 0 → x^2/(x^2 - 1) == 0
# Extremstelllen
f'(x) := d/dx(f(x)) → -(2*x)/(x^4 - 2*x^2 + 1)
f''(x) := d/dx(f'(x)) → (6*x^2 + 2)/(x^6 - 3*x^4 + 3*x^2 - 1)
f'(x) == 0 solve, x → 0
f''(0) → -2
# Wendestellen
f''(x) == 0 solve, x → [sqrt(3)*1i/3; -(sqrt(3)*1i)/3]
# Wendestellen
# streng monto steigend
# ]-∞, -1 .. □[ und ]-1, 0 .. □[
# streng monoton fallend:
# ]0, -1 .. □[ und ]1, ∞ .. □[
# [plot: f(x), y, a_s vs x, x_1, x_2]
