# WH-Verbesserung
# BSP 2)
f(x) == ln((x + 4)/(x^2 + 1))
f'(x) == (x^2 + 1)/(x + 4)*((1*(x^3 + 1) - 3*x^2 + (x + 4))/(x^(3^□) + 1)^2) == (x^(2^□) + 1 - 3*x^(3^□) - 12*x^(2^□))/(x + 4*(x^(3^□) + 1)) == (-2*x^(3^□) - 12*x^(2^□) + 1)/((x + 4)*(x^(3^□) + 1))
# Beispiel
f(x) := x^3/(2*x^2 - x - 1)
f'(x) := d/dx(f(x)) simplify, collect → (2*x^4 - 2*x^3 - 3*x^2)/(4*x^4 - 4*x^3 - 3*x^2 + 2*x + 1)
f''(x) := d/dx(f'(x)) simplify, collect → (6*x^3 + 6*x^2 + 6*x)/(8*x^6 - 12*x^5 - 6*x^4 + 11*x^3 + 3*x^2 - 3*x - 1)
f'''(x) := d/dx(f''(x)) simplify, collect → (-(36*x^4) - 48*x^3 - 72*x^2 - 6)/(16*x^8 - 32*x^7 - 8*x^6 + 40*x^5 + x^4 - 20*x^3 - 2*x^2 + 4*x + 1)
# Definitionsmenge
D := 2*x^2 - x - 1 == 0 solve, x → [1; -1/2]
# D = R/{-1/2, 1 .. □}
# Die Unstetigkeitsstellen sind Polstellen - also Polstellen bei x_1=-0.5 und x_2=1
# nicht stetig, keine Lücken
# senkrechte Asymptoten bei
D[0] → 1
D[1] → -1/2
# Schräge Asymptoten(die Terme wo das  X im Nenner nicht vorkommt)
f(x) parfrac; expand → 1/(24*x + 12) + 1/(3*x - 3) + x/2 + 1/4
a(x) := x/2 + 1/4
# schräge Asymptoten
limit(f(x), x → ∞) → ∞
limit(f(x), x → -∞) → -∞
# Verhalten an den Unstetigkeitsstellen
limit(f(x), x → 1+) → ∞
limit(f(x), x → 1-) → -∞
f(x) → x^3/(2*x^2 - x - 1)  # Stellen einsetzen
f(-0.4999) → 416.444479629
limit(f(x), x → -1/2+) → ∞
limit(f(x), x → -1/2-) → -∞
# Nullstellen
N_ALL := f(x) == 0 → x^3/(2*x^2 - x - 1) == 0
# Extremstellen
E := f'(x) == 0 solve, x → [0; 0; (sqrt(7) + 1)/2; (-sqrt(7) + 1)/2]
f''(E[0]) → 0  # keine Aussage möglich
f''(E[2]) = 1.20313
T := [E[2]; f(E[2])] = [1.82288; 1.58446]
f''(E[3]) = -2.58585
H := [E[3]; f(E[3])] = [-0.822876; -0.473348]
# Wendestellen
# Da die erste und die zweite Ableitung an der Stelle x = 0 jeweils 0 ist und die dritte Ableitung ungleich 0 ist, befinden sich bei x=0 ein Sattelpunkt.
W_ALL := f''(x) == 0 solve, x → [0; (sqrt(3)*1i - 1)/2; (-(sqrt(3)*1i) - 1)/2]
W_0 := [W_ALL[0]; f(W_ALL[0])] → [0; 0]
W_1 := [W_ALL[1]; f(W_ALL[1])]
W_2 := [W_ALL[2]; f(W_ALL[2])]
# Wendetangenten
t(x) := 0
# Monotonie
# streng monoton steigend: ]-∞,-0.82[  und  ]1.82, ∞ .. □[
# streng monoton fallend: ]-0.82, -0.5[  und  ]-0.5, 1 .. □[ und ]1, 182 .. □[
# Grafische Darstellung
# [plot: f(x), a(x), y vs x, D[0], D[1]]
