# Beispiel  5.38 1-3, 5.44c, 5.57, 5.59 1-4, 5.60 1-3
# 5.38)1-3)
f(x) := 1/32*x^4 - 3/4*x^2 + 7.5 → 0.03125*x^4 + (7.5 - 1.0*0.75*x^2)
f'(x) := d/dx(f(x)) → 0.125*x^3 - 1.5*x
f''(x) := d/dx(f'(x)) → 0.375*x^2 - 1.5
# root-Befehl liefert nummerische Lösungen
root(x)
g(x) := 1.5*x^2 - 1
W := f''(x) == 0 solve, x; assume, x == real → [2.0; -2.0]
W_1 := [2; f(W[0])] → [2; 5.0]
W_2 := [W[1]; f(W[1])] → [-2.0; 5.0]
# Graphische Darstellung
# [plot: f(x), g(x), W_1[1], W_2[1] vs x, W_1[0], W_2[0]]
