# Beispiel 5.32)
K(x) := 0.01*x^3 - 0.3*x^2 + 3*x + 6
E(x) := -1.5*x^2 + 15*x
# 2)
G(x) := E(x) - K(x) → -0.01*x^3 - 1.2*x^2 + 12.0*x - 6.0
G(x) == 0 solve, x; float → [8.78750800146; -129.315509193; 0.528001191626]
# Die Firma macht Gewinn wenn die Funktionswerte der Erlösfunktion größer als die Funktionswerte der Kostenfunktion sind. Hier liefert die Firma im Bereich von [1,8]ME(Mengeneinheiten) einen Gewinn.
# 3)
G'(x) := d/dx(G(x)) → -0.03*x^2 - 2.4*x + 12.0
x_max := G'(x) == 0 solve, x; assume, x > 0 → 4.72135955
# gewinnmaximierende Menge
G(x_max) → 22.8543819998
# Der maximale Gewinn bei 4.72 ME liegt bei 22.85GE.
# Funktionsgraph
# [plot: K(x), E(x), G(x) vs x]
# 5.37)
T(t) := -0.02*t^3 + 0.18*t^2 + 1.44*t + 16.84
T'(t) := d/dt(T(t)) → -0.06*t^2 + 0.36*t + 1.44
T''(t) := d/dt(T'(t)) → -0.12*t + 0.36
# 1)
clear(E)
E := T'(t) == 0 solve, t → [-2.74456264654; 8.74456264654]
# Höchstwert der Temperatur
T(E[1]) = 29.8228
# Wendetangente
W := T''(t) == 0 solve, t → 3.0
k := T'(W) → 1.98
W := [W; T(W)] → [3.0; 22.24]
d := W[1] == k*W[0] + d solve, d → 16.3
t(x) := k*x + d → 1.98*x + 16.3
# Wendetangente
# [plot: T(x), t(x), W[1] vs x, W[0]]
# 3)
# Die Wendetangente ist die maximale Änderungsrate. Also .
