# Beispiele 7.23, 7.25, 7.37ac, 7.39
# 7.23)
f(x) := a*x^3 + b*x^2 + c*x + d  # error: Diese Variable ist nicht definiert. Prüfen Sie, ob die Beschriftung richtig festgelegt ist.
f'(x) := d/dx(f(x)) → 3*a*x^2 + 2*b*x + c
f''(x) := d/dx(f'(x)) → 6*a*x + 2*b
# Bedingungen:
# I: f(3) = 5
# II: f''(4) = 0
# III: f(4) = 4
# IIII: f'(3) = 0
[a, b, c, d] := [f(3) == 5; f''(4) == 0; f(4) == 4; f'(3) == 0] solve, a, b, c, d → [1/2, -6, 45/2, -22]
f(x) := a*x^3 + b*x^2 + c*x + d → x^3/2 + (45*x/2 - (6*x^2 + 22))
P_y := f(6) → 5
# Tiefpunkt:
P_x := 6
f'(x) := d/dx(f(x)) → (3*x^2 + 45)/2 - 12*x
f''(x) := d/dx(f'(x)) → 3*x - 12
E := f'(x) == 0 solve, x → [5; 3]
f''(E[0]) → 3
f''(E[1]) → -3
T_1 := [E[0]; f(E[0])] → [5; 3]
# Skizze:
# [plot: f(x), T_1[1], x vs x, T_1[0], 2]
# a)
Flaeche := integral(f(x), x = 2 .. 5) float, 4 → 12.38  # Der Flächeninhalt der Funktion f(x) zwischen 2 und 5 beträgt 12.38FE.
# b)
k := f'(6) → 9/2
P_x := 6
clear(d)
P_y := f(P_x) → 5
d := P_y == k*P_x + d solve, d → -22 float → -22.0
t(x) := k*x + d → 4.5*x - 22.0
# [plot: f(x), t(x) vs x]
S := f(x) == t(x) solve, x → [0.0; 6.0; 6.0]
# Die Fläche,welche von f(x) und t(x) eingeschlossen wird beträgt 54FE.
Flaeche := integral(f(x) - t(x), x = 0 .. 6) → 54.0
# Beispiel 7.25)
clear(t, f, f', f'', g, y, Flaeche, a, b, c, d)
f(x) := a*x^2 + b*x + c  # error: Diese Variable ist nicht definiert. Prüfen Sie, ob die Beschriftung richtig festgelegt ist.
f'(x) := d/dx(f(x)) → 2*a*x + b
# Bedingungen:
# I: f(2) = 4
# II: f'(2) = 0
# III: I(0,3) f(x) = 20
[a, b, c] := [f(2) == 4; f'(2) == 0; integral(f(x), x = 0 .. 3) == 20] solve, a, b, c → [8/3, -32/3, 44/3]
# Die Funktionsgleichung von f(x) ist:
f(x) := a*x^2 + b*x + c → 8*x^2/3 + (44/3 - 32*x/3)
# 7.37a)c)
clear(y_1, y_2, f, y, a, b, c, d, e)
# 7.37a)
y_1(x) := 2*sin(3*x)
y_2(x) := x^2 - x + 0.25
# Skizze:
# [plot: y_1(x), y_2(x) vs x]
S := y_1(x) == y_2(x) solve, x; expand → 0.0359587500746
Flaeche := integral(y_1(x) - y_2(x), x = S .. S + 1) float, 3 → 1.24
# Die Fläche zwischen beiden eingeschlossenen Funktionen beträgt: 1.24 FE
clear(y_1, y_2, x, S)
# 7.37c)
y_1(x) := e^(2*x)
y_2(x) := 4
# [plot: y_1(x), y_2(x) vs x]
S := y_1(x) == y_2(x) solve, x; float, 3 → 0.693
Flaeche := integral(y_2(x) - y_1(x), x = 0 .. S) float, 3 → 1.27
# Die eingeschlossene Fläche zwischen beider Funktionen beträgt 1.27FE.
clear(y, f, a, y_1, y_2, P_x, P_y, Flaeche, f_1, f_2)
# 7.39)
f(x) := (x - 2)^2
# [plot: f(x) vs x]
# Skizze:
# a)
Flaeche := integral(f(x), x = 0 .. 2) → 8/3
integral(f(x), x = 0 .. x) == Flaeche/2 solve, x; assume, x == real; float, 2 → 0.41
# Die Gerade liegt bei ca. x= 0.41.
# b)
clear(y, f, a, y_1, y_2, P_x, P_y, Flaeche, f_1, f_2)
y == (x - 2)^2 solve, x → [-sqrt(y) + 2; sqrt(y) + 2]
f(x) := -1*sqrt(x) + 2
flaeche := integral(f(x), x = 0 .. 4) → 8/3
integral(f(x), x = 0 .. x) == flaeche/2 solve, x; assume, x == real; assume, x < 4 → 1
