# Beispiele 7.5)a-c)
# a)
Flaeche := integral(f(x), x = a .. b) + |integral(f(x), x = b .. c)|  # error: Diese Variable ist nicht definiert. Prüfen Sie, ob die Beschriftung richtig festgelegt ist.
# b)
Flaeche := integral(g(t), t = t_1 .. t_2) + |integral(g(t), t = t_2 .. t_3)|  # error: Diese Variable ist nicht definiert. Prüfen Sie, ob die Beschriftung richtig festgelegt ist.
# c)
Flaeche := |integral(h(x), x = a .. b)|  # error: Diese Variable ist nicht definiert. Prüfen Sie, ob die Beschriftung richtig festgelegt ist.
# Beispiele 7.7a-c)
# a)
# 1) | 2)
# x-Achse -> y-Achse
Flaeche := integral(c - 2*x, x = 0 .. a)  # error: Diese Variable ist nicht definiert. Prüfen Sie, ob die Beschriftung richtig festgelegt ist.
Flaeche := integral(y/2, y = 0 .. c)
y == 2*x solve, x → y/2
# b)
# 1) | 2)
# umformen
y(x) := -x^2 + 9
x == sqrt(9 - y)
y(0) → 9
y(x) == 0 solve, x; assume, x > 0 → 3
Flaeche := integral(sqrt(9 - y), y = 0 .. 9)
Flaeche := integral(-x^2 + 9, x = 0 .. 3)
clear(y)
# c)
# 1) | 2)
y(x) := 0.5*x^3
y(x) == 0.5*x^3
nthroot(2*y, 3) == x
y(2) → 4.0
Flaeche := integral(4 - 0.5*x^3, x = 0 .. 2)
Flaeche := nthroot(2, 3)*integral(nthroot(y, 3), y = 0 .. 4)
# Beispiel 7.11a)
f(x) := 1/x - 1
a := 1/2
b := 2
# Skizze
S_1 := f(x) == a solve, x → 2/3
S_2 := f(x) == b solve, x → 1/3
# [plot: f(x) vs x, a, b]
S_3 := f(x) == 0 solve, x → 1
Flaeche := integral(f(x), x = a .. S_3) - integral(f(x), x = S_3 .. b) → 1/2  # Die eingeschlossene Fläche beträgt 1/2E^2
clear(f, g, a, b)
# 7.15a)b)
f(x) := x^3 - 4*x + 2
g(x) := 3*x - 4
S := f(x) == g(x) solve, x → [2; 1; -3]
# [plot: f(x), g(x), x vs x, S[0], S[1], S[2]]
# Skizze:
# Fläche:
Flaeche := integral(f(x) - g(x), x = S[2] .. S[1]) + integral(f(x) - g(x), x = S[1] .. S[0]) float, 4 → 31.25
# Der eingeschlossene Flächeninhalt der Funktionen f(x) und g(x) beträgt 31.25E^2.
# b)
clear(f, g)
g(t) := -t^3 + 2*t + 4
h(t) := -2*t + 4
S := g(t) == h(t) solve, t → [0; 2; -2]
# Skizze:
# [plot: g(t), h(t) vs t]
Flaeche := 2*integral(h(t) - g(t), t = S[2] .. S[0]) → 8
# Der eingeschlossene Flächeninhalt beider Funktionen (g(x),h(x)) beträgt: 8E^2
clear(h, g, f, y, S)
# Beispiele 7.16a)b)
# a)
y_1(x) := x^3
y_2(x) := 3*x^2 + x - 3
S := y_1 == y_2 solve, x → [3; 1; -1]
# [plot: y_1(x), y_2(x) vs x]
Flaeche := integral(y_1(x) - y_2(x), x = S[2] .. S[1]) + integral(y_2(x) - y_1(x), x = S[1] .. S[0]) → 8
# Die von y1(x) und y2(x)eingeschlossene Fläche beträgt: 8E^2.
# b)
f(x) := x^3
g(x) := -2*x^2 + 3*x
S := f(x) == g(x) solve, x → [0; 1; -3]
# Skizze:
# [plot: f(x), g(x) vs x]
Flaeche := integral(f(x) - g(x), x = S[2] .. S[0]) + integral(g(x) - f(x), x = S[0] .. S[1]) float, 4 → 11.83
# Die eingeschlossene Fläche zwischen f(x) und g(x) beträgt 11.83 E^2.
