# Beispiele 7.50a)b), 7.53b), 7.60), 7.63), 7.69a)b)
# Beispiel 7.50a)
# Das Volumen des Körpers im angegebenem Intervall beträgt 16.49E^3
# [1;4]
y(x) := x/2
V_x := π*integral(y(x)^2, x = 1 .. 4) float, 4 → 16.49
clear(y, V_x)
# Beispiel 7.50b)
y(x) := -x^2 + 3  # [-1;1]
# Das Volumen des Körpers im angegebenem Intervall beträgt 45.2E^3
V_x := π*integral(y(x)^2, x = -1 .. 1) float, 3 → 45.2
# Beispiel 7.53b)
clear(V_x, y)
f(x) := y == ln(x) solve, x → e^y
d := 1
# Das Volumen des Körpers im angegebenem Intervall beträgt 11.39E^3
c := -1
V_y := π*integral(f(x)^2, y = c .. d) float, 4 → 11.39
clear(a, b, c, f)
# Beispiel 7.60)
# Funktionsgleichung 1)
f_1(x) := a*x^2 + b*x^1 + c  # error: Diese Variable ist nicht definiert. Prüfen Sie, ob die Beschriftung richtig festgelegt ist.
f'_1(x) := d/dx(f_1(x)) → 2*a*x + b
[a, b, c] := [f_1(0) == 3; f_1(2) == 4; f'_1(2) == 0] solve, a, b, c → [-1/4, 1, 3]
f_1(x) := a*x^2 + b*x + c → -x^2/4 + x + 3
# Funktionsgleichung 2)
f_2(x) := 4
# Funktionsgleichung 3)
f_3(x) := q*x^2 + m*x + n  # error: Diese Variable ist nicht definiert. Prüfen Sie, ob die Beschriftung richtig festgelegt ist.
f'_3(x) := d/dx(f_3(x)) → 2*q*x + m
[q, m, n] := [f_3(27) == 4; f_3(31) == 1.5; f'_3(27) == 0] solve, q, m, n → [-0.15625, 8.4375, -109.90625]
f_3(x) := q*x^2 + m*x + n → -0.15625*x^2 + 8.4375*x - 109.90625
# Funktionsgleichung 4)
clear(V_x)
f_4(x) := 1.5
V_x := π*(integral(f_1(x)^2, x = 0 .. 2) + integral(f_2(x)^2, x = 2 .. 27) + integral(f_3(x)^2, x = 27 .. 31) + integral(f_4(x)^2, x = 31 .. 33)) float, 7 → 1488.801
# Skizze:
# 1) Das Volumen der Wasserflasche beträgt 1.49 l oder 1.49 dm^3
# [plot: f_1(x)*(0 ≤ x ≤ 2), f_2(x)*(2 ≤ x ≤ 27), f_3(x)*(27 ≤ x ≤ 31), f_4(x)*(31 ≤ x ≤ 33) vs x]
# 1l = 1dm^3
# Flasche gefüllt bis strichlierte linie d.h
# 2)
1000 == π*(integral(f_1(x)^2, x = 0 .. 2) + integral(f_2(x)^2, x = 2 .. l)) solve, l; float, 5 → 20.203
# Die Mineralwasserflasche ist bei einer Befüllung von 1 l  20.203 cm hoch befüllt.
clear(V_x, V_y, f_1, f_2, f_3, f_4, a, b, c, d, e, f, g, h, i, j, k, l, m, n, o, p)
# 7.63)
f_1(x) := 30/10*x → 3*x
f_2(x) := a*x^3 + b*x^2 + c*x + d  # error: Diese Variable ist nicht definiert. Prüfen Sie, ob die Beschriftung richtig festgelegt ist.
# Ableitungen:
f'_2(x) := d/dx(f_2(x)) → 3*a*x^2 + 2*b*x + c
f''_2(x) := d/dx(f'_2(x)) → 6*a*x + 2*b
[a, b, c, d] := [f_2(10) == 30; f_2(40) == 25; f''_2(40) == 0; f'_2(20) == 0] solve, a, b, c, d → [1/1800, -1/15, 2, 145/9]
f_2(x) := a*x^3 + b*x^2 + c*x + d
V_x := π*(integral(f_1(x)^2, x = 0 .. 10) + integral(f_2(x)^2, x = 10 .. 80)) float, 9 → 157505.299
# 2)
f'_2(x) := d/dx(f_2(x)) → (x^2 - 80*x)/600 + 2
f''_2(x) := d/dx(f'_2(x)) → (x - 40)/300
E := f'_2(x) solve, x → [60; 20]
f''_2(E[0]) → 1/15
f''_2(E[1]) → -1/15
clear(V_x, V_y, f_1, f_2, f_3, f_4, a, b, c, d, e, f, g, h, i, j, k, l, m, n, o, p)
T := [E[0]; f_2(E[0])] float, 4 → [60.0; f_2(60.0)]
d := 16.11*2 → 32.22  # Der kleinste Durchmesser beträgt 32.22 mm
# 3)
M := V_x/1000*8.5 → 0.0085*V_x
# Die Masse des Lots beträgt 1338.80 g oder 1.34 kg.
clear(V_x, V_y)
# 7.69a)b)
g(x) := sqrt(x)
f(x) := x - 2
# 7.69a)
S_x := g(x) == f(x) solve, x; float → 4.0
# [plot: g(x), f(x) vs x]
S_y := g(S_x) → 2.0
# 1)
V_x := π*(integral(g(x), x = 0 .. S_x) - integral(f(x), x = 0 .. S_x)) float, 4 → 16.76
# 2)
y == x - 2 solve, x → y + 2
y == sqrt(x) solve, x → y^2
m(x) := x + 2
n(x) := x^2
V_y := π*integral(m(x)^2 - n(x)^2, x = 0 .. S_y) float, 4 → 38.54  # E^3
# 7.69b)
clear(V_x, m, n, S, S_x, S_y, V_y, f_1, f_2, f_3, f_4, a, b, c, d, e, f, g, h, i, j, k, l, m, n, o, p)
f(x) := 1/2*x^2
g(x) := 4 - x
# [plot: f(x), g(x) vs x]
# 1)
S := f(x) == g(x) solve, x → [2; -4]
f(2) → 2
g(2) → 2
f(x) == 0 solve, x → [0; 0]
V_x := π*(integral(f(x)^2, x = 0 .. 2) + integral(g(x)^2, x = 2 .. 4)) float, 5 → 13.404  # E^3
# 2)
clear(y)
f(x) == g(x) solve, x → [2; -4]
y == 1/2*x^2 solve, x → [-sqrt(2*y); sqrt(2*y)]
f(x) := sqrt(2*x)
y == 4 - x solve, x → -y + 4
g(x) := -x + 4
V := π*(integral(g(x)^2, x = 0 .. 2) - integral(f(x)^2, x = 0 .. 2)) → 44*π/3 = 46.0767  # E^3
