# Bsp 1.128)
# a)
y(0) == 2
q := 1
Δy(t) := y(t + 1) - y(t)  # error: Diese Variable ist nicht definiert. Prüfen Sie, ob die Beschriftung richtig festgelegt ist.
y(t + 1) - y(t) == 4
y(t) := 4 - y(t + 1)
y(t) := 4*t + 2
clear(Δy, y, t)
# b)
y(0) == 5
q := 1.1
y(t + 1) == 1.1*y(t)
y(t) == 5*1.1^t
# 1.129)
# a)
# Darstellung erfolgt durch exponentielles Wachstum.
y(t + 1) == y(t)*(1 + 0.0225)
# b)
# Darstellung erfolgt durch lineares Wachstum.
y(t + 1) == y(t) - 5
# c)
# Darstellung erfolgt durch exponentiellen Zerfall.
y(t + 1) == y(t)*0.5
# 1.130)
# a) 1)
Y[0] := 10
q := 0.8
t := 0 .. 6
Y[t + 1] := Y[t]*q
# [plot: Y[t] vs t]
Y[t] float, 3 → [10.0; 8.0; 6.4; 5.12; 4.1; 3.28; 2.62]
# a) 2
Y[0] := 10
t := 0 .. 6
Y[t + 1] := 1.8*Y[t] - 1
Y[t] float, 3 → [10.0; 17.0; 29.6; 52.3; 93.1; 167.0; 299.0]
# [plot: Y[t] vs t]
# b) 1)
Y[0] := 100
Y[t + 1] := Y[t]*1.06 - 10
# [plot: Y[t] vs t]
t := 0 .. 6
Y[t] float, 3 → [100.0; 96.0; 91.8; 87.3; 82.5; 77.5; 72.1]
# b) 2)
Y[t + 1] := 1.06*Y[t] - 5
Y[0] := 100
# [plot: Y[t] vs t]
Y[t] float, 3 → [100.0; 101.0; 102.0; 103.0; 104.0; 106.0; 107.0]
# 1.131)
# a)
Y[0] := 1000
# Zwilling 1)
y(t + 1) == y(t)*(1 + 0.0375)
# Zwilling 2)
y(t + 1) == y(t) + 50
# b)
# Zwilling 1) | Zwilling 2)
# Hierbei handelt es sich um ein exponentielles Wachstumsmodell.
# Hierbei handelt es sich um ein lineares Wachstumsmodell.
# c)
# Zwilling 1) | Zwilling 2)
y(n) := Y[0]*1.0375^n
y_2(n) := Y[0] + 50*n
y(12) float, 6 → 1555.45
y_2(12) → 1600
y(18) float, 6 → 1939.93
y_2(18) → 1900
# A) Es lässt sich Feststellen, dass das lineare Wachstum ab dem 12ten Lebensjahr von Zwilling 2 größer ist, jedoch wird die Summe beim Zwilling 1 ab dem 18ten Lebensjahr größer.
# Bsp 1.132)
# a)
Y[0] := 250
n := 0, 1 .. 5
Z[0] := 80
Y[n + 1] := Y[n] - (80*0.4^n)
Z[n + 1] := Z[n]*0.4
Y[n + 1] := Y[n] - Z[n]
Y[n] = [250; 170; 138; 125.2; 120.08; 118.032]
Y[5] = 118.032
# Nach 5 Jahren gab es 118 SuS in diesem Jahrgang.
# b)
Y[n + 1] := Y[n] - Z[n] + 10
Y_2[n + 1] := Y[n] - Z[n] + 10
Y[5] = 168.032
Y[n] = [250; 180; 158; 155.2; 160.08; 168.032]  # Insgesamt gab es nach 5 Jahren 168 Schülerrinnen, wenn 10 zusätzliche jährlich dazugekommen sind.
# [plot: Y[n], Y_2[n + 1] vs n]
# 1.133)
Y[0] := 245000
# a = Wachstumsrate: 4.5%
# b = konstante Abnahme -6000
b := -6000
n := 0 .. 45
y(n + 1) == 1.045*y(n) - 6000
Y[n + 1] := 1.045*Y[n] - 6000
# [plot: Y[n] vs n]
# 2) Die Geldsumme nach 15 Jahren beträgt 343 828.18€.
# 3) Ja man kann 45 Jahre lang jährlich 6.000 € abheben.
# Allgemeine Summenformel für die Geometrische Reihe:
s(n) := b_1*((q^n - 1)/(q - 1))  # error: Diese Variable ist nicht definiert. Prüfen Sie, ob die Beschriftung richtig festgelegt ist.
y(n) := 1.045^n*Y[0] - 6000*((1.045^n - 1)/(1.045 - 1))*1.045
y(15) → 343828.178153
clear(Y, n)
# 1.134)
Y[0] := 1500
q := 0.15
n := 0 .. 20
Y[n + 1] := q*Y[n] + 2000
# [plot: Y[n] vs n]
Y[10] float, 6 → 2352.94
Y[20] → 2352.94117647
# Nach 10 Jahren wird es gleich viele Fische wie nach 20 geben und zwar: 1352
# 1.135)
Y_2016 := 100
Y_2017 := 150
Y[0] := 100
q := Y_2017/Y_2016 → 3/2
Y[n + 1] := q*Y[n]  # Wachstum:
Y[n] := q^n*Y[0]
# 2)
Y[n + 1] := q*Y[n] - 60
# Es kommt auf das Jahr an. Werden 2017 Fische jeweils 60 Fische gefangen nimmt des Fischbestand in den nachfolgenden Jahren ab.
Y[1] → 90
Y[3] float, 4 → 52.5
Y[2] → 75
Y[4] float, 4 → 18.75
# 3)
# Es können am Beginn von 2017 jeweils 50 Fische gefangen werden, da sich die Fische von 2016 auf 2017 um 50 vermehren. Somit bleibt der Fischbestand beim fang von 50 bestehen.
# 4)
Y[n + 1] := q*Y[n] - 30
Y[n] := q^n*Y_2016 - 30*(1.5^n - 1)/(1.5 - 1)
Y[4] → 262.5
# 1.136)
q := 1.012
Z[0] := 100
Y[0] := 5000
q_z := 0.9
Z[n + 1] := q_z*Z[n]  # Nach 5 Jahren leben noch genau 4886 Menschen in der Gemeinde.
Y[n + 1] := q*Y[n] - Z[n]
Y[5] → 4886.78032685
# 1.137)
Y[0] := 0
n := 0, 1 .. 10
# 1)
# Hierbei handelt es sich um ein beschränktes Wachstumsmodell.
# 2)
# Ihr standen 200 Dosen zur Verfügung daher ist K = 200 und sie hat nach einer Stunde 200 Lose verkauft das heißt, dass die Steigung bei 1/2 liegt.
k := 100/200 → 1/2
K := 200
Y[n + 1] := Y[n] + k*(K - Y[n])
# 3)
# [plot: Y[t + 1] vs t]
# 4)
Y[4] float → 187.5
# Da der Ball um 20:00 öffnet  wurden daher nach 4 Stunden, also um 00:00 187 Dosen verkauft.
clear(k)
# 1.138)
Y[0] := 25
q := 100/25 → 4
Y[1] := 100
# Linear
t := 0, 1 .. 10
Y[t + 1] - Y[t] == Y[t] + 75
Y_1[0] := 25
Y_1[t + 1] := Y_1[t] + 75
# Exponentiell
Y[n + 1] == Y[n]*4
Y_2[0] := 25
Y_2[t + 1] := Y_2[t]*q
# Logistisch
Y[t + 1] == Y[t] + k*Y[t]*(800 - Y[t])
Y_3[0] := 25
Y_3[1] := 100
K := 800
k := 100 == Y[0] + k*Y[0]*(K - Y[0]) solve, k → 3/775
Y_3[t + 1] := Y_3[t] + 3/775*Y_3[t]*(800 - Y_3[t])
# 2)
# [plot: Y_3[t + 1], Y_2[t + 1], Y_1[t + 1] vs t]
# Modell 1: (Wachstum linear): 9 Monate
# Modell 2: (Wachstum exponentiell): 3 Monate (2.4)
# Modell 3: (Wachstum logistisch): 3 Monate (2.5)
clear(n, t, Y, q)
# 1.139)
n := 0, 1 .. 20
ΔY[n] == 0.98*Y[n] + 1
Y[0] := 1*10^9
q := 0.98
Y[n + 1] := q*(Y[n] + 365*24*60*60)
Y[20] → 1181241406.89
# Nach 20 Jahren wird es ungefähr 1181241406.89 fm Holz in Österreich geben.
