# 2)a)b)
# a)
f(x) := a*x^3 + b*x^2 + c*x + d  # error: Diese Variable ist nicht definiert. Prüfen Sie, ob die Beschriftung richtig festgelegt ist.
g(x) := 2*x - 4 → 2*x - 4
# Bedingungen:
# I:f(1) = 0
# II: f(2) = -17
# III: f'(1) = -4
# IIII: f'(0) = 2
tan(104.0362*deg) → tan(104.0362*deg)
g'(x) := d/dx(g(x)) → 2
f'(x) := d/dx(f(x)) → 3*a*x^2 + 2*b*x + c
[a, b, c, d] := [f(1) == 0; f(2) == -17; f'(1) == -4; f'(0) == 2] solve, a, b, c, d → [-4, 3, 2, -1]
f(x) := a*x^3 + b*x^2 + c*x + d → -(4*x^3) + 3*x^2 + 2*x - 1
# b)
clear(f, f', g', g)
f(x) := sqrt(x^2 + 15^2) + sqrt((40 - x)^2 + 25^2)
f'(x) := d/dx(f(x)) simplify → x/sqrt(x^2 - 80*x + 2225) + (x/sqrt(x^2 + 225) - 40/sqrt(x^2 - 80*x + 2225))
f'(x) solve, x → 15
# Die Materialausgabe ist in einer Entfernung von 15m zu errichten.
# ii) Ohne die Nebenbedingung könnten mehrere Maximas oder Minimas existieren. Sie ist dazu da um die Lösungspunkte eindeutig festzulegen.
# Bsp 3)
K(t) := 31/(0.18 - 0.5)*(e^(-0.5*t) - e^(-0.18*t))
# b)
K'(t) := d/dt(K(t)) → -17.4375*e^(-0.18*t) + 48.4375*e^(-0.5*t)
K''(t) := d/dt(K'(t)) → 3.13875*e^(-0.18*t) - 24.21875*e^(-0.5*t)
E := K'(t) == 0 solve, t → 3.19266014854
K''(E) → -3.14090177964
H := [E; K(E)] float, 4 → [3.193; 34.9]
# Die Konzentration ist nach 3.19h mit 34μ*g/lam höchsten.
# c)
G(t) := 1.4
root(K(t) - G(t), t, 20, 30) = 23.5356
# Die Konzentration ist nach 23.54h unter die Nachweisegrenzen von 1.4(m*g)/lgesunken.
# d)
M(t) := 8
u_1 := root(K(t) - M(t), t, 10, 20) = 13.7876
u_2 := root(K(t) - M(t), t, 0, 10) = 0.284142
Diff := u_1 - u_2 → 13.5034994762
# Das Medikament hat nach 13.50 h eine Mindestkonzentration von 8(μ*g)/l.
# e)
W_ALL := K''(t) == 0 solve, t → 6.38532029707
W := [W_ALL; K(W_ALL)] → [6.38532029707; 26.7159677927]
# Der Ausscheidungsgrad ist nach 6,39 h am Höchsten.
# a)
# [plot: K(t), M(t), G(t) vs t]
