# Beispiel:
#
# Berechnen Sie das Volumen eines Kegels mit der Höhe h und dem Radius r
y(x) := -r/h*x + r  # error: Diese Variable ist nicht definiert. Prüfen Sie, ob die Beschriftung richtig festgelegt ist.
f(y_1) := y_1 == -h/r*x + h solve, x → (h - y_1)*r/h
# Rotationsvolumen -Rotation um die x-Achse:
V_x := π*integral(y(x)^2, x = 0 .. r) → π*(r^5/(3*h^2) + (r^3 - r^4/h))
# Rotation um die y-Achse
V_y := π*integral(f(y_1)^2, y_1 = 0 .. r) → π*(r^5/(3*h^2) + (r^3 - r^4/h))
