# 7.54)
# nach y auflösen bei x-rotieirrung
V_x := π*integral(r^2 - y^2, y = r - h .. r) → π*(h^2*r - h^3/3)
# 7.59)
clear(f, f_2, f_1)
f_1(x) := 6
0 ≤ x ≤ 4
f_2(x) := a*x^2 + b*x + c  # error: Diese Variable ist nicht definiert. Prüfen Sie, ob die Beschriftung richtig festgelegt ist.
f'_2(x) := d/dx(f_2(x)) → 2*a*x + b
[a, b, c] := [f_2(4) == 6; f_2(17) == 5/2; f'_2(4) == 0] solve, a, b, c → [-7/338, 28/169, 958/169]
4 ≤ x < 17
f_2(x) := a*x^2 + b*x + c → -7*x^2/338 + 28*x/169 + 958/169
f_3(x) := u*x^2 + v*x + w  # error: Diese Variable ist nicht definiert. Prüfen Sie, ob die Beschriftung richtig festgelegt ist.
f'_3(x) := d/dx(f_3(x)) → 2*u*x + v
[u, v, w] := [f_3(20) == 4; f'_3(20) == 0; f_3(17) == 5/2] solve, u, v, w → [-1/6, 20/3, -188/3]
f_3(x) := u*x^2 + v*x + w → -x^2/6 + (20*x/3 - 188/3)
# [plot: f_1(x)*(0 ≤ x ≤ 4), f_2(x)*(4 ≤ x ≤ 17), f_3(x)*(17 ≤ x ≤ 24) vs x]
V := 2*π*integral(f_1(x)^2, x = 0 .. 4) + integral(f_2(x)^2, x = 4 .. 17) + integral(f_3(x)^2, x = 17 .. 24) float, 6 → 1301.22
m := V*0.7 → 910.854  # Die Masse beträgt 1188.5 oder etwa 1.19kg
# 3)
V_x := π*(integral(f_1(x)^2, x = 0 .. 4) + integral(f_2(x)^2, x = 4 .. 17) + integral(f_3(x)^2, x = 17 .. 24)) = 1697.86  # cm^3
ρ := 0.7  # g/cm^3
m := V_x*ρ = 1188.5  # g  # Masse: 1.188*10^3g oder 1.19 kg.
(3)
h := 24
s := 12
V := s^2*h = 3456  # cm^3
V_Verschnitt := V - V_x = 1758.14
V_Verschnitt*100/V = 50.8722  # %
