# Beispiel  7.74ab), 7.75c), 7.77 1-3)
# 7.74a)
y(x) := 4*sqrt(x^3)
0 < x ≤ 2
y'(x) := d/dx(y(x)) → 6*x^2/sqrt(x^3)  # Die Länge beträgt 11.53LE.
L := integral(sqrt(1 + y'(x)^2), x = 0 .. 2) float, 4 → 11.53  # LE
# 7.74b)
clear(y, y', L, x)
0 ≤ x ≤ 4
y(x) := x*sqrt(x)
# Die Länge beträgt 9.07 LE.
y'(x) := d/dx(y(x)) → 3*sqrt(x)/2
L := integral(sqrt(1 + y'(x)^2), x = 0 .. 4) float, 3 → 9.07  # LE
clear(y, y', L, x)
# 7.75c)
-1 ≤ x ≤ 3
y(x) := x^3
y'(x) := d/dx(y(x)) → 3*x^2
# Die Länge beträgt 29.21LE.
L := integral(sqrt(1 + y'(x)^2), x = -1 .. 3) float, 4 → 29.21  # LE
# 7.77)1)
f(x) := a*x^3 + b*x^2 + c*x + d  # error: Diese Variable ist nicht definiert. Prüfen Sie, ob die Beschriftung richtig festgelegt ist.
f'(x) := d/dx(f(x)) → 3*a*x^2 + 2*b*x + c
clear(a, b, c, d)
[a, b, c, d] := [f(0) == 2; f'(0) == 0; f(5/2) == 1/5; f'(5/2) == 0] solve, a, b, c, d → [144/625, -108/125, 0, 2]
f(x) := a*x^3 + b*x^2 + c*x + d → 144*x^3/625 + (2 - 108*x^2/125)
clear(f', f'')
# 2)
f'(x) := d/dx(f(x)) → (432*x^2 - 1080*x)/625  # Wendepunkt = höchste Steigung
f''(x) := d/dx(f'(x)) → (864*x - 1080)/625
# Wendepunkt berechnen
f''(x) == 0 solve, x → 5/4
α := tan(α) == f'(295/246) solve, α → -atan(45312/42025)
# bogenmaß -> grad
# Die Neigung der Rutsche überschreitet den Winkel von 60 Grad nicht da, diese im Wendepunkt,welcher der Punkt mit der höchsten Steigung ist, 47.2 Grad beträgt.
α*360/(2*π) float, 4 → -47.16
# 3)
b := 0.80
L := integral(sqrt(1 + f'(x)^2), x = 0 .. 2.5) float, 3 → 3.16  # LE
F := L*b float, 3 → 2.53  # m^(2^□)
# Es werden ca 2.55m^(2^□)für das Blech der Rutsche verwendet.
