# Beispiel  7.84, 7.86 1-2a), 7.92bc
# 7.84)
y(x) := 0.25*x^2
h := 1
Y := y_t == 0.25*(x^2) solve, x → [-4.0*(0.25*y_t)^0.5; 4.0*(0.25*y_t)^0.5]
f(x) := 4*(0.25*x)^0.5
f'(y) := d/dy(f(y)) → 0.5/(0.25*y)^0.5
M_y := 2*π*integral(f(y)*sqrt(1 + f'(y)^2), y = 0 .. h) float, 4 → 15.32
# Es werden 15.32 m^2 Mantelfläche gebraucht um den Parabolspiegel auszukleiden.
clear(f, f', y, M_y)
# 7.86)
# A) einschaliges Drehhyperboloid
# B) zweischaliges Drehhyperboloid
# (2a) y-Achse
x^2/9 - y^2/16 == 1 solve, x → [sqrt(144*y^2 + 2304)/16; -sqrt(144*y^2 + 2304)/16]
f(y) := sqrt(144*y^2 + 2304)/16
f'(y) := d/dy(f(y)) → 3*y/(4*sqrt(y^2 + 16))
# Die Mantelfläche des Drehhyperboloids beträgt 248.97m^2
-5 ≤ y ≤ 5
M_y := 2*π*integral(f(y)*sqrt(1 + f'(y)^2), y = -5 .. 5) float, 5 → 248.97
clear(f, f', M_y, y)
# 7.92b)c)
# b)
f(x) := sin(x)
0 ≤ x ≤ π
a := 0
b := π
# linearer Mittelwert:
f(ζ) := 1/(b - a)*integral(f(x), x = a .. b) float, 2 → 0.64
# quadratischer Mittelwert:
μ_quad := sqrt(1/(b - a)*integral(f(x)^2, x = a .. b)) float, 3 → 0.64
# c)
clear(a, b, f, μ_quad)
y(x) := 3*e^x
0 ≤ x ≤ 3
a := 0
b := 3
# linearer Mittelwert:
f(ζ) := 1/(b - a)*integral(y(x), x = a .. b) float, 4 → 19.09
# quadratischer Mittelwert:
μ_quad := sqrt(1/(b - a)*integral(y(x)^2, x = a .. b)) float, 4 → 24.57
