# Beispiel 7.75, 7.78, 7.116)
# 7.75)
# a)
y(x) := 2*sqrt(x)
1 ≤ x ≤ 4
# LE
y'(x) := d/dx(y(x)) → x^(-1/2)
f(ζ) := integral(sqrt(1 + y'(x)^2), x = 1 .. 4) float, 3 → 3.62  # LE
clear(f, y)
# b)
y(x) := 1/2*x^2
a := -2
b := 2
y'(x) := d/dx(y(x)) → x
f(ζ) := integral(sqrt(1 + y'(x)^2), x = a .. b) float, 3 → 5.92  # LE
clear(f, y, a, b)
# c)
y(x) := x^3
a := -1
b := 3
y'(x) := d/dx(y(x)) → 3*x^2
f(ζ) := integral(sqrt(1 + y'(x)^2), x = a .. b) float, 3 → 29.2  # LE
clear(f, y, a, b)
# 7.78)
a := 0
b := 2
y(x) := |sin(π/2*x)|
y'(x) := d/dx(y(x)) → π*cos(x*π/2)*signum(sin(x*π/2), 0)/2
f(ζ) := integral(sqrt(1 + y'(x)^2), x = a .. b) float, 3 → 2.93
L := f(ζ)*4 float, 4 → 11.72  # LE
# 7.116)
# 1)
W := integral(F(s), s = s_1 .. s_2)  # error: Diese Variable ist nicht definiert. Prüfen Sie, ob die Beschriftung richtig festgelegt ist.
a == dt/dv
v == ds/dt
W := integral(m*a, s = s_1 .. s_2) == integral(m*dv/dt, s = v_1 .. v_2)*integral(m*dv/dt, t = v_1 .. v_2) == integral(m*v, v = v_1 .. v_2)  # error: Diese Variable ist nicht definiert. Prüfen Sie, ob die Beschriftung richtig festgelegt ist.
W := 1/2*m*(v_2^2 - v_1^2)  # error: Diese Variable ist nicht definiert. Prüfen Sie, ob die Beschriftung richtig festgelegt ist.
# 2)
W := 1/2*m*v^2  # error: Diese Variable ist nicht definiert. Prüfen Sie, ob die Beschriftung richtig festgelegt ist.
# 3)
v_1 := 30/3.6
m := 900
v_2 := 60/3.6 float, 4 → 16.67
W := 1/2*m*(v_2^2 - v_1^2) → 93800.005  # J
# 7.85)
clear(f, y, δ, ζ)
δ(t) := -0.1*t^2 + 2*t + 10
# [plot: δ(t) vs t]
μ_quad := sqrt(1/(17 - 0)*integral(δ(t)^2, t = 0 .. 17)) float, 4 → 17.56  # °C
δ(t) := -0.1*t^2 + 2*t + 15
1/(17 - 0)*integral(δ(t), t = 0 .. 17) float, 4 → 22.37  # °C
