# Beispiel)  7.106), 7.106), 7.176)
# 7.106)
v(t) := 15*t*e^(-1.8*t)
# 1)
# In diesem Sachzusammenhang ist das Wasser in Litern gemeint, welches von t1 bis t2 aus dem Spülkasten fließt.
# 2)
v'(t) := d/dt(v(t)) → (-27.0*t + 15.0)*e^(-1.8*t)
b := v'(t) solve, t; float, 2 → 0.56
a := 0  # Nach ca 0.56s fließt 1.24 l wasser aus dem Spülkasten
integral(v(t), t = a .. b) float, 3 → 1.24
# 3)
f(t) := integral(v(t), t = 0 .. t) - 3 → (-8.33333333333*t - 4.62962962963)*e^(-1.8*t) + 1.62962962963
root(f(t), t, 0, 5) float, 3 → 1.23  # Nach 1.23s sind 3l wasser geflossen
# 7.176)
f(t) := -0.0037*t^4 + 0.237*t^3 - 5.91*t^2 + d*t  # error: Diese Variable ist nicht definiert. Prüfen Sie, ob die Beschriftung richtig festgelegt ist.
d := 1/(25 - 5)*integral(f(t), t = 5 .. 25) == 220 solve, d; float, 4 → 63.51
# Die Konstante d beträgt 63.51°C/min.
f(t) := -0.0037*t^4 + 0.237*t^3 - 5.91*t^2 + d*t
# [plot: f(t) vs t]
