# Beispiel 3 und 4 Kapitel 5.1.6 (Seite 38)
# a)
# Bedingungen:
# I: K(0) = 7800
# II: K(5) = 8000
# III: c(50) = 205
# IIII: c'(100) = 0
K(x) := a*x^3 + b*x^2 + c*x + d  # error: Diese Variable ist nicht definiert. Prüfen Sie, ob die Beschriftung richtig festgelegt ist.
c_1(x) := K(x)/x → (a*x^3 + b*x^2 + c*x + d)/x
c'(x) := d/dx(c_1(x)) → 2*a*x + (b - d/x^2)
[a, b, c, d] := [K(0) == 7800; K(5) == 8000; c_1(50) == 205; c'(100) == 0] solve, a, b, c, d → [1/250, -1/50, 40, 7800]
K(x) := a*x^3 + b*x^2 + c*x + d → x^3/250 + (40*x + 7800 - x^2/50)
# b)
# Grenzkostenfunktion, Grenzkosten
K'(x) := d/dx(K(x)) → 3*x^2/250 + (40 - x/25)
K(5) → 8000
# Kostenkehre
K''(x) := d/dx(K'(x)) → (3*x - 5)/125
K''(x) == 0 solve, x → 5/3
# Betriebsminimum
c_v(x) := (K(x) - K(0))/x simplify → x^2/250 + (40 - x/50)
c'_v(x) := d/dx(c_v(x)) → x/125 - 1/50
x_min := c'_v(x) == 0 solve, x → 5/2 = 2.5  # Das Betriebsoptimum wird bei einer Produktionsmenge von 2.5 ME und einem Preis von 39.98 GE/ME erreicht.
c_v(x_min) → 39.975
# [plot: K(x_1), K'(x_1), K''(x_1) vs x_1]
# Beispiel 4)
clear(K, K', K'', C, C', C_var, C'_var, x_min, a, b, c, d, K_c)
X := [15; 20; 25; 30]
Y := [850000; 900000; 951200; 1003975]
n := rows(X) → 4
K(a, b, c, d) := sum((a*X[i]^3 + b*X[i]^2 + c*X[i] + d - Y[i])^2, i = 0 .. n - 1)
K_a(a, b, c, d) := d/da(K(a, b, c, d)) → 108000*d + 2822500*c + 76050000*b + (2097062500*a - 104077150000)
K_b(a, b, c, d) := d/db(K(a, b, c, d)) → 4300*d + 108000*c + 2822500*b + (76050000*a - 4098655000)
K_c(a, b, c, d) := d/dc(K(a, b, c, d)) → 180*d + 4300*c + 108000*b + (2822500*a - 169298500)
K_d(a, b, c, d) := d/dd(K(a, b, c, d)) → 8*d + 180*c + 4300*b + (108000*a - 7410350)
[a, b, c, d] := [K_a(a, b, c, d) == 0; K_b(a, b, c, d) == 0; K_c(a, b, c, d) == 0; K_d(a, b, c, d) == 0] solve, a, b, c, d → [1/2, -6, 19495/2, 703450]
K(x) := a*x^3 + b*x^2 + c*x + d → x^3/2 + 19495*x/2 + (703450 - 6*x^2)
# b)
K_var(x) := K(x) - K(0) → x^3/2 + (19495*x/2 - 6*x^2)
K_f := K(0) → 703450
# Die fixen Kosten betragen 703450 GE.
# c)
# Grenzkostenfunktion
K'(x) := d/dx(K(x)) → (3*x^2 + 19495)/2 - 12*x
# Kostenkehre
K''(x) := d/dx(K'(x)) → 3*x - 12
# Die Kostenkehre liegt bei 4 ME
K''(x) == 0 solve, x → 4
# d)
c_1(x) := K(x)/x → (x^3/2 + 19495*x/2 + (703450 - 6*x^2))/x
c'_1(x) := d/dx(c_1(x)) → x - (703450/x^2 + 6)
x_opt := c'_1(x) == 0 solve, x; assume, x == real; float, 4 → 90.98
c_1(x_opt) → 21072.2193031
# Das Betriebsoptimum wird bei einer Produktionsmenge von 90.98 ME und einem Preis von 21072.22 GE/ME erreicht.
# e)
c_var(x) := K_var(x)/x simplify → (x^2 + 19495)/2 - 6*x
c'_var(x) := d/dx(c_var(x)) → x - 6
x_min := c'_var(x) == 0 solve, x → 6
c_var(x_min) float, 5 → 9729.5
# Das Betriebsminimum wird bei einer Produktionsmenge von 6 ME und einem Preis von 9729.5 GE/ME erreicht.
# Skizze:
# [plot: K(x), K'(x), K''(x), K_var(x), c_var(x), c'_var(x), c_1(x) vs x]
