# Beipiel 7.22)
f(x) := 1/2*x^2
# Ableitungen:
f'(x) := d/dx(f(x)) → x
# Tangente berechnen:
k := f'(3) → 3
d := f(3) == 3*k + d solve, d → -9/2
t(x) := k*x + d → -9/2 + 3*x
t(3) → 9/2
t(x) == 0 solve, x → 3/2
# Skizze:
# [plot: f(x), t(x) vs x]
# Fläche berechnen:
integral(f(x), x = 0 .. 3) - integral(t(x), x = 3/2 .. 3) → 9/8 float → 1.125
# Ganze Fläche - 3/2 - 3 = Fläche
clear(a, b)
# 7.31)
y_1(x) := 0.1*x^3 - 0.7*x^2 + 1.3*x + a  # error: Diese Variable ist nicht definiert. Prüfen Sie, ob die Beschriftung richtig festgelegt ist.
y_2(x) := 0.15*x^3 - 1.55*x^2 + 5*x + b  # error: Diese Variable ist nicht definiert. Prüfen Sie, ob die Beschriftung richtig festgelegt ist.
# 1)
Fläche := integral(y_1(x), x = 0 .. 5) + integral(4, x = 5 .. 6) - integral(y_2(x), x = 1 .. 6)  # error: Diese Variable ist nicht definiert. Prüfen Sie, ob die Beschriftung richtig festgelegt ist.
# 2)
a := y_1(5) == 4 solve, a → 2.5
b := y_2(1) == 0 solve, b → -3.6
# Fläche Blau
Fläche_Blau := 12.23
Fläche_Grün := 4*6 - Fläche_Blau → 11.77
# Wir benötigen also 12.33l von der Blauen und 11.77l von der grünen Farbe
clear(y_1, y_2, y_3)
# 7.37) b) d)
y_1(x) := x*e^(x^2) + e
y_3(x) := 0
y_2(x) := -x*e^(x^2) + e
y_1(x) == 0 solve, x → -1
Fläche := 2*integral(y_1(x), x = -1 .. 0) → e + 1 float, 3 → 3.72
# Skizze:
# [plot: y_1(x), y_2(x), y_3(x) vs x]
