# 7.92 a)
f(x) := x^2 + 2
-1 ≤ x ≤ 2
b := 2
a := -1
# 1)
1/(b - a)*integral(f(x), x = a .. b) float, 5 → 3.0
# 2)
μ := sqrt(1/(b - a)*integral(f(x)^2, x = a .. b)) float, 3 → 3.19
# [plot: f(x), μ vs x]
# Zeta muss aus dem Intervall sein und Kein Rand Extremum.
f(x) == 3 solve, x → [1; -1]
f(1) → 3
# 7.104)
a(t) := -1.2*t^2 + 2.4*t
# Lösung:
(a)
# [plot: a(t) vs t, 0.5, 1]
A := integral(a(x), x = 0.5 .. 1) → 0.55  # ms
# Die Fläche ist Geschwindigkeit im Bereich von 0.5 - 1 s. Die Fläche entspricht der Geschwindigkeit in der sich das Wägelchen im Intervall von 0.5 - 12
# 2)
a(t) == 0 solve, t → [0.0; 2.0]
# Nach 2s ist die Beschleunigung 0.2ms
v(t) := integral(a(t), t) + C → -0.4*t^2*(t - 3.0) + C
C := v(0) == 0 solve, C → 0
v(t) → -0.4*t^2*(t - 3.0) + C
v(2) → C + 1.6  # Die Geschwindigkeit beträgt 1,6m/s zum Zeitpunkt.
Weg := integral(v(t), t = 0 .. 2) → 2.0*C + 1.6
# Das Wägelchen legt in den ersten beiden Sekunden einen Weg von 1.6m zurück
