# HÜ Beispiele auf Seite 2 zu finden.
# Beispiel 1 Kapitel 5.1.2)
# Gro
X := [0; 10; 20; 30; 40; 50; 60]
Y := [50; 80; 100; 110; 115; 125; 150]
# Linienstil ändern bei x und y.
n := rows(X) → 7
f(a, b) := sum((a*X[i] + b - Y[i])^2, i = 0 .. n - 1)  # Summe mit str + shift $
f_a(a, b) := d/da(f(a, b)) → 420*b + (18200*a - 51900)
f_b(a, b) := d/db(f(a, b)) → 14*b + (420*a - 1460)
[a, b] := [f_a(a, b) == 0; f_b(a, b) == 0] solve, a, b → [81/56, 1705/28]
K_lin(x) := a*x + b → 81*x/56 + 1705/28
# [plot: Y, K_lin(X) vs X]
# kubische auch nach dem selben Muster
# Mathe Hü: quadratische und Kubische Funktion ermitteln nach obigem Schema
# HÜ)
# quadratische Funktion
f(a_1, b_1, c_1) := sum((a_1*X[i]^2 + b_1*X[i] + c_1 - Y[i])^2, i = 0 .. n - 1)
f_a1(a_1, b_1, c_1) := d/da_1(f(a_1, b_1, c_1)) → 18200*c_1 + 882000*b_1 + (45500000*a_1 - 2367000)
f_b1(a_1, b_1, c_1) := d/db_1(f(a_1, b_1, c_1)) → 420*c_1 + 18200*b_1 + (882000*a_1 - 51900)
f_c1(a_1, b_1, c_1) := d/dc_1(f(a_1, b_1, c_1)) → 14*c_1 + 420*b_1 + (18200*a_1 - 1460)
[a_1, b_1, c_1] := [f_a1(a_1, b_1, c_1) == 0; f_b1(a_1, b_1, c_1) == 0; f_c1(a_1, b_1, c_1) == 0] solve, a_1, b_1, c_1 → [-17/1680, 115/56, 335/6]
K_quad(x) := a_1*x^2 + b_1*x + c_1 → -17*x^2/1680 + 115*x/56 + 335/6
# [plot: Y, K_quad(x) vs X, x]
# kubische Funktionsgleichung
f(a_2, b_2, c_2, d_2) := sum((a_2*X[i]^3 + b_2*X[i]^2 + c_2*X[i] + d_2 - Y[i])^2, i = 0 .. n - 1)
f_a2(a_2, b_2, c_2, d_2) := d/da_2(f(a_2, b_2, c_2, d_2)) → 882000*d_2 + 45500000*c_2 + 2440200000*b_2 + (134342000000*a_2 - 118470000)
f_b2(a_2, b_2, c_2, d_2) := d/db_2(f(a_2, b_2, c_2, d_2)) → 18200*d_2 + 882000*c_2 + 45500000*b_2 + (2440200000*a_2 - 2367000)
f_c2(a_2, b_2, c_2, d_2) := d/dc_2(f(a_2, b_2, c_2, d_2)) → 420*d_2 + 18200*c_2 + 882000*b_2 + (45500000*a_2 - 51900)
f_d2(a_2, b_2, c_2, d_2) := d/dd_2(f(a_2, b_2, c_2, d_2)) → 14*d_2 + 420*c_2 + 18200*b_2 + (882000*a_2 - 1460)
[a_2, b_2, c_2, d_2] := [
    f_a2(a_2, b_2, c_2, d_2) == 0;
    f_b2(a_2, b_2, c_2, d_2) == 0;
    f_c2(a_2, b_2, c_2, d_2) == 0;
    f_d2(a_2, b_2, c_2, d_2) == 0
] solve, a_2, b_2, c_2, d_2 → [1/900, -37/336, 2155/504, 295/6]
K_kub(x) := a_2*x^3 + b_2*x^2 + c_2*x + d_2 → x^3/900 + (2155*x/504 + 295/6 - 37*x^2/336)
# [plot: Y, K_kub(x) vs X, x]
