# Beispiel 1) Kapitel 5.1)
K(x) := 1/900*x^3 - 37/336*x^2 + 2155/504*x + 205/6
# a) Fixe Kosten
K_f := K(0) → 205/6
# variable Kosten
K_var(x) := K(x) - K(0) → x^3/900 + (2155*x/504 - 37*x^2/336)
# Grenzkosten
K'(x) := d/dx(K(x)) → (42*x^2 - 2775*x + 53875)/12600
# Kostenkehre
K''(x) := d/dx(K'(x)) → x/150 - 37/168
# Kostenkehre liegt bei 33.04ME
K''(x) == 0 solve, x; float, 4 → 33.04
# Stückkosten
c(x) := K(x)/x → (x^3/900 + (2155*x/504 + 205/6 - 37*x^2/336))/x
c'(x) := d/dx(c(x)) → x/450 - (205/(6*x^2) + 37/336)
x_opt := c'(x) == 0 solve, x; assume, x == real → 54.6933665881
# Das Betriebsoptimum wird einer Produktionsmenge von 56.49 ME und einem Preis von 2.247 GE/ME (langfristige Preisuntergrenze).
# Durch das werden die
c(x_opt) → 2.20144526707
c_var(x) := K_var(x)/x simplify → (28*x^2 - 2775*x + 107750)/25200
# Betriebsminimum:
c'_var(x) := d/dx(c_var) → 0
x_min := c'_var(x) == 0 solve, x → 0
# Kurzfristige Preisuntergrenze:
c_var(x_min) float, 3 → 4.28
clear(K, K', K'', c, c_var, K_var, c'_var, x_min, c', x_opt, K_f)
# Beispiel 2)
K(x) := a*x^3 + b*x^2 + c*x + d  # error: Diese Variable ist nicht definiert. Prüfen Sie, ob die Beschriftung richtig festgelegt ist.
K'(x) := d/dx(K(x)) → 3*a*x^2 + 2*b*x + c
K''(x) := d/dx(K'(x)) → 6*a*x + 2*b
# Lösung:
# Bedingungen:
# I: K(0) = 16
# II: K'(0) = 8
# III: K'(2) = 2
# IIII: K''(2) = 0
# Kostenkehre = ändern ihr Verhalten --> Wendepunk
[a, b, c, d] := [K(0) == 16; K'(0) == 8; K'(2) == 2; K''(2) == 0] solve, a, b, c, d → [1/2, -3, 8, 16]
K(x) := a*x^3 + b*x^2 + c*x + d → x^3/2 + 8*x - 3*x^2 + 16
clear(c)
# a) Fixe Kosten
K_f := K(0) → 16
# variable Kosten
K_var(x) := K(x) - K(0) → x^3/2 + (8*x - 3*x^2)
# Grenzkosten
K'(x) := d/dx(K(x)) → 3*x^2/2 + (8 - 6*x)
# Kostenkehre
K''(x) := d/dx(K'(x)) → 3*x - 6
# Kostenkehre liegt bei 33.04ME
K''(x) == 0 solve, x; float, 4 → 2.0
# Stückkosten
c(x) := K(x)/x → (x^3/2 + 8*x - 3*x^2 + 16)/x
c'(x) := d/dx(c(x)) → x - (16/x^2 + 3)
x_opt := c'(x) == 0 solve, x; assume, x == real → 4
c(x_opt) → 8
c_var(x) := K_var(x)/x simplify → x^2/2 + (8 - 3*x)
# Betriebsminimum:
c'_var(x) := d/dx(c_var) → 0
x_min := c'_var(x) == 0 solve, x → 0
# Kurzfristige Preisuntergrenze:
c_var(x_min) float, 3 → 8.0
