# Beispiel 1)
f(x) := -0.0959*x^2 + 0.767*x + 1.1
f'(x) := d/dx(f(x)) → -0.1918*x + 0.767
# Er wirft die Kugel aus der Höhe 1.1m
# 2)
S := integral(sqrt(1 + f'(x)^2), x = 0 .. x)  # error: Diese Variable ist nicht definiert. Prüfen Sie, ob die Beschriftung richtig festgelegt ist.
# Beispiel 2)
f(x) := a*x^4 + b*x^2 + c  # error: Diese Variable ist nicht definiert. Prüfen Sie, ob die Beschriftung richtig festgelegt ist.
f'(x) := d/dx(f(x)) → 4*a*x^3 + 2*b*x
f''(x) := d/dx(f'(x)) → 12*a*x^2 + 2*b
# Bedingungen:
# I: f(0) = 10
# II: f(21) = 6
# III: f''(26) = 0
[a, b, c] := [f(0) == 10; f(21) == 6; f''(26) == 0] solve, a, b, c → [4/1594215, -5408/531405, 10]
f(x) := a*x^4 + b*x^2 + c → 4*x^4/1594215 + (10 - 5408*x^2/531405)
Flaeche := integral(f(x), x = -21 .. 42) → 2499714/6025  # FE
# Beispiel 3)
f(x) := a*x^4 + b*x^3 + c*x^2
f'(x) := d/dx(f(x)) → (16*x^3 - 48672*x^2)/1594215 + 20*x
f''(x) := d/dx(f'(x)) → (16*x^2 - 32448*x)/531405 + 20
[a, b, c] := [f(-92.2) == -17.6; f'(-92.2) == 0; f(-133.5) == 0; f''(-133.5) == 0] solve, a, b, c →  # error: Falsche Auflösungsvariable.
