# 20) c)
f(x) := x^2/3
Volumen := π*integral(f(x)^2, x = 0 .. 4) → 1024*π/45
y == x^2/3 solve, x → [-sqrt(3*y); sqrt(3*y)]
f(0) → 0
f(4) → 16/3
f(y) := sqrt(3*y)
Volumen_y := π*integral(f(y)^2, y = 0 .. 16/3) float, 5 → 134.04
# Beispiel 10)
clear(f, Volumen_y, Volumen)
f(x) := x^2
y == 4
# [plot: f(x), 4 vs x]
f(x) == 4 solve, x → [2; -2]
A := |integral(4 - f(x), x = 0 .. 2)| → 16/3
# 9)
clear(a, b)
f''(x) := 3/4*x - 3
f'_n(x) := integral(f''(x), x) expand → 3*x^2/8 - 3*x
f'(x) := 3*x^2/8 - 3*x + C
f(x) := integral(f'(x), x) expand → x^3/8 - 3*x^2/2 + C*x
f_n(x) := f(x) + C_2 → x^3/8 + (C*x + C_2 - 3*x^2/2)
f'_nn(x) := d/dx(f_n(x)) → 3*x^2/8 + (C - 3*x)
# Bedingungen:
# I: f(4) = 6
# II: f'(4) = -3/2
[C, C_2] := [f'(4) == -3/2; f_n(4) == 6] solve, C, C_2 → [9/2, 4]
f(x) := x^3/8 - 3*x^2/2 + C*x + C_2 expand → x^3/8 - 3*x^2/2 + 9*x/2 + 4
# [plot: f(x) vs x]
f'(x) := d/dx(f(x)) → (3*x^2 + 36)/8 - 3*x
f''(x) := d/dx(f'(x)) → 3*x/4 - 3
f''(x) == 0 solve, x → 4
f(x) == 0 solve, x; assume, x == real; float, 3 → -0.711
clear(f)
# 11)
f'(t) := (2*t + 4)/(t^2 + 1)
f(t) := integral(f'(t), t) → ln(t^2 + 1) + 4*atan(t)
f(t) := ln(t^2 + 1) + 4*atan(t) + 4
f(3) float, 5 → 11.299
f''(t) := d/dt(f'(t)) → (-(2*t^2) - 8*t + 2)/(t^4 + 2*t^2 + 1)
f''(t) == 0 solve, t; float, 3 → [-4.24; 0.236]
clear(f'', f', f)
# 16)
g(x) := x - 0.5
y^2 == 2*x + 2 solve, y → [sqrt(2*x + 2); -sqrt(2*x + 2)]
f(x) := sqrt(2*x + 2)
# [plot: f(x), g(x) vs x]
f(x) == 0 solve, x → -1
f(x) == g(x) solve, x → 3.5
F_1 := integral(f(x), x = -1 .. 3.5) → 9.0
16/3 float, 2 → 5.3
g(x) == 0 solve, x → 0.5
F_2 := integral(g(x), x = 0.5 .. 3.5) → 4.5
F_1 - F_2 → 4.5
clear(f, F_1, F_2, f', f'')
# 23)
f(x) := a*x^4 + b*x^2 + c  # error: Diese Variable ist nicht definiert. Prüfen Sie, ob die Beschriftung richtig festgelegt ist.
# Bedingungen:
# I: f(\^5) = 0
# II: f(0) = 5
# III:
integral(f(x), x = -1 .. 1)
[a, b, c] := [integral(f(x), x = -1 .. 1) == 6.4; f(0) == 5; f(sqrt(5)) == 0] solve, a, b, c → [1.0, -6.0, 5.0]
f(x) := a*x^2 + b*x + c → x^2 - 6.0*x + 5.0
