# Arbeitsblatt 2.2_1a)
f(x) := x + cos(x)
x_0 := -1
f(x_0) → cos(1) - 1
f'(x_0) := d/dx_0(f(x_0)) → -sin(x_0) + 1
f'(-1) → sin(1) + 1
clear(f, f')
# 3)
f(x) := x^3 - 2*x^2 + 4*x
f'(x) := d/dx(f(x)) → 3*x^2 - 4*x + 4
k := f'(-1) → 11
y := f(-1) → -7
y(x) := k*x + d  # error: Diese Variable ist nicht definiert. Prüfen Sie, ob die Beschriftung richtig festgelegt ist.
-7 == 11*(-1) + d solve, d → 4
y(x) := 11*x + 4
# fhdsjf
f(x) := e^x*sqrt((x - 1)/(x + 1))
f'(x) := d/dx(f(x)) → x^2*e^x/((x^2 + 2*x + 1)*sqrt(-2/(x + 1) + 1))
v'(x) := e^x*sqrt((x - 1)/(x + 1)) + e^x*1/(2*sqrt((x - 1)/(x + 1)))*((x + 1) - (x - 1))/(x + 1)^2 simplify → x^2*e^x/((x + 1)^2*sqrt(-2/(x + 1) + 1))
1/sqrt((3*x - 7)/(3*x + 7)) → ((3*x - 7)/(3*x + 7))^(-1/2)
clear(y, f, f')
y(x) := x + cos(x) → cos(x) + x
y_1 := y(-1) float, 4 → -0.4597
y'(x) := d/dx(y(x))
y'(-1) float, 3 → 1.84
y_1 == 1.84*(-1) + d solve, d → 1.3803
t(x) := 1.84*x + 1.38
# 3) a)
f(x) := x^4 + 4/3*x^3 - 4*x^2 + 13/3
f'(x) := d/dx(f(x)) → 4*x^3 + 4*x^2 - 8*x
f''(x) := d/dx(f'(x)) → 12*x^2 + 8*x - 8
# Definitonsmenge
# d = R, keine lückem, keine Polstellen, gerade funktion, stetig
# Nulstellen
N := f(x) == 0 solve, x; assume, x == real; float, 5 → [-1.0; -2.6193]
N_1 := [N[0]; f(N[0])] → [-1.0; 0.0]
N_2 := [N[1]; f(N[1])] float, 2 → [-2.6; -0.00037]
# Verhalten im Unendlichen
limit(f(x), x → ∞) → ∞
limit(f(x), x → -∞) → ∞
# Extremstellen
E := f'(x) == 0 solve, x → [0; 1; -2]
f''(E[0]) → -8
f''(E[2]) → 24
f''(E[1]) → 12
H_1 := [E[0]; f(E[0])] → [0; 13/3]
T_2 := [E[2]; f(E[2])] → [-2; -19/3]
T_1 := [E[1]; f(E[1])] → [1; 8/3]
# Wendestellen und Wendetangenten
W := f''(x) == 0 solve, x; float, 3 → [0.549; -1.22]
W_1 := [W[0]; f(W[0])] float, 3 → [0.549; 3.44]
W_2 := [W[1]; f(W[1])] float, 3 → [-1.22; -1.83]
k_1 := f'(W_1[0]) → -2.524519404
k_2 := f'(W_2[0]) → 8.450208
d_1 := W_1[1] == k_1*W_1[0] + d_1 solve, d_1 → 4.8259611528
d_2 := W_2[1] == k_2*W_2[0] + d_2 solve, d_2 → 8.47925376
t_1(x) := k_1*x + d_1 float, 3 → -2.52*x + 4.83
t_2(x) := k_2*x + d_2 float, 3 → 8.45*x + 8.48
# [plot: f(x), t_1(x), t_2(x), H_1[1], T_1[1], T_2[1] vs x, H_1[0], T_1[0], T_2[0]]
# Monotonie
#
# streng monoton steigend:
# ]T_2[0] → -2,0[ und ] T_1[0] → 1,∞[
# streng monoton fallend:
# ] -∞,-2[ und ]0,-1[
clear(f, x, d_1, d_2, k_1, k_2, T_1, H_1, T_2)
# Umkehraufgaben
f(x) := a*x^4 + b*x^3 + c*x^2 + d*x + e  # error: Diese Variable ist nicht definiert. Prüfen Sie, ob die Beschriftung richtig festgelegt ist.
# Bedingungen:
# I: f(1) = 0
# II: f'(1) = 0
# III: f(2) = 2
# IIII: f''(2) = 0
# IIIII :f'(2) = 1
f'(x) := d/dx(f(x)) → 4*a*x^3 + 3*b*x^2 + 2*c*x + d
f''(x) := d/dx(f'(x)) → 12*a*x^2 + 6*b*x + 2*c
# 5)
f(x) := a*x^3 + b*x^2 + x*c + d  # error: Diese Variable ist nicht definiert. Prüfen Sie, ob die Beschriftung richtig festgelegt ist.
g(x) := p*x^2 + q*x + r  # error: Diese Variable ist nicht definiert. Prüfen Sie, ob die Beschriftung richtig festgelegt ist.
# Bedingung f(x):
# I: f(2) = 3
# II: f(1)  = -1
# III: f'(1) = 0
# IIII:
f(x) := 2*(2*x + 5)^(1/2) + (2*x + 5)/sqrt((2*x + 5)) simplify → (6*x + 15)/sqrt(2*x + 5)
clear(f, f', x)
f(x) := (2*x + 5)*sqrt(2*x + 5)
f'(x) := d/dx(f(x)) → (6*x + 15)/sqrt(2*x + 5)
