# Beispiel  7.107 1-5), 7.176), 7.96 1-3)
# 1)
# Das Einatmen lässt sich im Bereich von [0, 2] Sekunden anhand des Funktionsgraphen feststellen. Bei x=2s lässt sich die maximale Atemgeschwindigkeit feststellen. Zwischen 2 und 4 sinkt die Atemgeschwindigkeit wieder auf 0.
# 2)
v(t) := a*t^2 + b*t + c  # error: Diese Variable ist nicht definiert. Prüfen Sie, ob die Beschriftung richtig festgelegt ist.
v'(t) := d/dt(v(t)) → 2*a*t + b
v''(t) := d/dt(v'(t)) → 2*a
[a, b, c] := [v(2) == 0.6; v'(2) == 0] solve, a, b, c → [-0.15, 0.6, 0.0]
v(t) := a*t^2 + b*t + c → -0.15*t^2 + 0.6*t
# Die Fließrate v lässt sich durch die obige Funktion v(t) ermitteln.
# 3)
L(t) := integral(v(t), t) parfrac → -0.05*t^3 + 0.3*t^2
# 4)
clear(a, b, c, d)
f(x) := a*x^3 + b*x^2 + c*x + d  # error: Diese Variable ist nicht definiert. Prüfen Sie, ob die Beschriftung richtig festgelegt ist.
[a, b, c, d] := [f(3) == 0; f(1.5) == 0.5; f(0) == 0; f(6) == 0] solve, a, b, c, d; float, 4 → [0.04938, -0.4444, 0.8889, 0.0]
f(x) := a*x^3 + b*x^2 + c*x + d → 0.04938*x^3 - 0.4444*x^2 + 0.8889*x
# [plot: f(x) vs x]
# 5)
L_1 := integral(f(x), x = 1 .. 3) float, 2 → 0.69
L_2 := integral(f(x), x = 2 .. 3) - integral(f(x), x = 3 .. 4) float, 2 → 0.42
# Der Patient atmet im Intervall1 eine Luftmenge von 0.69 L aus. Und im Intervall2 0.42 L.
clear(f, a, b, d)
# 7.176)
f(t) := -0.0037*t^4 + 0.237*t^3 - 5.91*t^2 + d*t  # error: Diese Variable ist nicht definiert. Prüfen Sie, ob die Beschriftung richtig festgelegt ist.
a := 5
b := 25
d := 1/(b - a)*integral(f(t), t = a .. b) == 220 solve, d; float, 4 → 63.51
# Die Konstante d beträgt 63.51 °C/min.
clear(a, b, c, t, d, e, f, g, h, i, j, k, l, m, n, o, p, k, r, s, t, v)
# 7.96)
# 1)
# Die negative Geschwindigkeit bedeutet, dass zurückgefahren wird.
# 2)
v_1(t) := (60 - 0)/(1/60 - 0)*t → 3600*t
0 ≤ t ≤ 1/60
v_2(t) := 60
1/60 ≤ t ≤ 5/60
5/60 ≤ t ≤ 6/60
v_3(t) := k*t + d  # error: Diese Variable ist nicht definiert. Prüfen Sie, ob die Beschriftung richtig festgelegt ist.
[k, d] := [v_3(5/60) == 60; v_3(6/60) == 0] solve, k, d → [-3600, 360]
v_3(t) := k*t + d → -(3600*t) + 360
v_4(t) := h*t + p  # error: Diese Variable ist nicht definiert. Prüfen Sie, ob die Beschriftung richtig festgelegt ist.
6/60 ≤ t ≤ 7/60
[h, p] := [v_4(6/60) == 0; v_4(7/60) == -20] solve, h, p → [-1200, 120]
v_4(t) := h*t + p → -(1200*t) + 120
v_5(t) := -20
7/60 ≤ t ≤ 8/60
# [plot: v_1(t)*(0 ≤ t ≤ 1/60), v_2(t)*(1/60 ≤ t ≤ 5/60), v_3(t)*(5/60 ≤ t ≤ 6/60), v_4(t)*(6/60 ≤ t ≤ 7/60), v_5(t)*(7/60 ≤ t ≤ 8/60) vs t]
# 2) mittlere Geschwindigkeit v_m
v_m := (integral(v_1(t), t = 0 .. 1/60) + integral(v_2(t), t = 1/60 .. 5/60) + integral(v_3(t), t = 5/60 .. 6/60) - integral(v_4(t), t = 6/60 .. 7/60) - integral(v_5(t), t = 7/60 .. 8/60))/(8/60) → 165/4 = 41.25
# Die mittlere Geschwindigkeit über die gesamte Strecke beträgt 41.25 km/h.
s_G := 8/60*v_m → 5.5
s_E := integral(v_1(t), t = 0 .. 1/60) + integral(v_2(t), t = 1/60 .. 5/60) + integral(v_3(t), t = 5/60 .. 6/60) + integral(v_4(t), t = 6/60 .. 7/60) + integral(v_5(t), t = 7/60 .. 8/60) → 9/2 = 4.5
# Das Auto hat 5.5km zurückgelegt und ist 4.5km vom Ausgangspunkt entfernt.
