# Kapitel 5.2.2 Beispiel 1a, 2a, 5a, 6a)
# Kapitel 5.3.3 Beispiel 1)
# Beispiel 1a)
X := [140; 160; 180; 190; 200]
Y := [10; 20; 45; 57; 70]
n := rows(X) → 5
a_lin(k, d) := sum((k*X[i] + d - Y[i])^2, i = 0 .. n - 1)
a_k_lin(k, d) := d/dk(a_lin(k, d)) → 307400*k + (1740*d - 75060)
a_d_lin(k, d) := d/dd(a_lin(k, d)) → 1740*k + (10*d - 404)
[k, d] := [a_k_lin(k, d) == 0; a_d_lin(k, d) == 0] solve, k, d → [1191/1160, -553/4]
a_lin(x) := k*x + d → 1191*x/1160 - 553/4
a_quad(a, b, t) := sum((a*X[i]^2 + b*X[i] + t - Y[i])^2, i = 0 .. n - 1)
a_a_quad(a, b, t) := d/da(a_quad(a, b, t)) → 307400*t + 55062000*b + (9984980000*a - 14047400)
a_b_quad(a, b, t) := d/db(a_quad(a, b, t)) → 1740*t + 307400*b + (55062000*a - 75060)
a_t_quad(a, b, t) := d/dt(a_quad(a, b, t)) → 10*t + 1740*b + (307400*a - 404)
[a, b, t] := [a_a_quad(a, b, t) == 0; a_b_quad(a, b, t) == 0; a_t_quad(a, b, t) == 0] solve, a, b, t → [347/37520, -39609/18760, 57912/469]
a_quad(x) := a*x + b*x + t → -78871*x/37520 + 57912/469
# Beispiel 2a)
clear(a, b, k, n, c, d, x, t, X, Y, a_quad, a_lin, a_a_quad, a_b_quad, a_k_lin, a_d_lin, a_t_quad)
X := [140; 160; 180; 190; 200]
Y := [70; 55; 34; 22; 10]
n := rows(X) → 5
# linear)
n_lin(k, d) := sum((k*X[i] + d - Y[i])^2, i = 0 .. n - 1)
n_k_lin(k, d) := d/dk(n_lin(k, d)) → 307400*k + (1740*d - 61800)
n_d_lin(k, d) := d/dd(n_lin(k, d)) → 1740*k + (10*d - 382)
[k, d] := [n_k_lin(k, d) == 0; n_d_lin(k, d) == 0] solve, k, d → [-1167/1160, 853/4]
n(x) := k*x + d → -1167*x/1160 + 853/4
# quadratisch)
clear(n)
n := rows(X) → 5
n_quad(a, b, c) := sum((a*X[i]^2 + b*X[i] + c - Y[i])^2, i = 0 .. n - 1)
n_a_quad(a, b, c) := d/da(n_quad(a, b, c)) → 307400*c + 55062000*b + (9984980000*a - 10151600)
n_b_quad(a, b, c) := d/db(n_quad(a, b, c)) → 1740*c + 307400*b + (55062000*a - 61800)
n_c_quad(a, b, c) := d/dc(n_quad(a, b, c)) → 10*c + 1740*b + (307400*a - 382)
[a, b, c] := [n_a_quad(a, b, c) == 0; n_b_quad(a, b, c) == 0; n_c_quad(a, b, c) == 0] solve, a, b, c → [-1041/187600, 16449/18760, 52727/938]
n_quad(x) := a*x^2 + b*x + c → -1041*x^2/187600 + 16449*x/18760 + 52727/938
# 5a)
clear(Y, X, k, d, a, b, c, n_quad, n_lin, n_k_lin, n_d_lin, n_a_quad, n_b_quad, n_c_quad, n)
clear(a, b, k, n, c, d, x, t, X, Y, a_quad, a_lin, a_a_quad, a_b_quad, a_k_lin, a_d_lin, a_t_quad)
# linear)
X := [60; 70; 80; 90; 100]
Y := [5800; 6300; 7215; 8327; 9120]
n := rows(X) → 5
a_lin(k, d) := sum((k*X[i] + d - Y[i])^2, i = 0 .. n - 1)
a_k_lin(k, d) := d/dk(a_lin(k, d)) → 66000*k + (800*d - 6055260)
a_d_lin(k, d) := d/dd(a_lin(k, d)) → 800*k + (10*d - 73524)
[k, d] := [a_k_lin(k, d) == 0; a_d_lin(k, d) == 0] solve, k, d → [8667/100, 2094/5]
a_lin(x) := k*x + d → 8667*x/100 + 2094/5
# quadratisch
clear(Y, X, k, d, a, b, c, n_quad, n_lin, n_k_lin, n_d_lin, n_a_quad, n_b_quad, n_c_quad, n)
clear(a, b, k, n, c, d, x, t, X, Y, a_quad, a_lin, a_a_quad, a_b_quad, a_k_lin, a_d_lin, a_t_quad)
X := [60; 70; 80; 90; 100]
Y := [5800; 6300; 7215; 8327; 9120]
n := rows(X) → 5
a_quad(a, b, c) := sum((a*X[i]^2 + b*X[i] + c - Y[i])^2, i = 0 .. n - 1)
a_a_quad(a, b, c) := d/da(a_quad(a, b, c)) → 66000*c + 5600000*b + (487080000*a - 513149400)
a_b_quad(a, b, c) := d/db(a_quad(a, b, c)) → 800*c + 66000*b + (5600000*a - 6055260)
a_c_quad(a, b, c) := d/dc(a_quad(a, b, c)) → 10*c + 800*b + (66000*a - 73524)
[a, b, c] := [a_a_quad(a, b, c) == 0; a_b_quad(a, b, c) == 0; a_c_quad(a, b, c) == 0] solve, a, b, c → [783/1400, -1971/700, 136023/35]
a_quad(x) := a*x^2 + b*x + c → 783*x^2/1400 + (136023/35 - 1971*x/700)
# kubisch
clear(Y, X, k, d, a, b, c, n_quad, n_lin, n_k_lin, n_d_lin, n_a_quad, n_b_quad, n_c_quad, n)
clear(a, b, k, n, c, d, x, t, X, Y, a_quad, a_lin, a_a_quad, a_b_quad, a_k_lin, a_d_lin, a_t_quad)
X := [60; 70; 80; 90; 100]
Y := [5800; 6300; 7215; 8327; 9120]
n := rows(X) → 5
a_kub(a, b, c, d) := sum((a*X[i]^3 + b*X[i]^2 + c*X[i] + d - Y[i])^2, i = 0 .. n - 1)
a_a_kub(a, b, c, d) := d/da(a_kub(a, b, c, d)) → 5600000*d + 487080000*c + 43280000000*b + (3915780000000*a - 44596326000)
a_b_kub(a, b, c, d) := d/db(a_kub(a, b, c, d)) → 66000*d + 5600000*c + 487080000*b + (43280000000*a - 513149400)
a_c_kub(a, b, c, d) := d/dc(a_kub(a, b, c, d)) → 800*d + 66000*c + 5600000*b + (487080000*a - 6055260)
a_d_kub(a, b, c, d) := d/dd(a_kub(a, b, c, d)) → 10*d + 800*c + 66000*b + (5600000*a - 73524)
[a, b, c, d] := [
    a_a_kub(a, b, c, d) == 0;
    a_b_kub(a, b, c, d) == 0;
    a_c_kub(a, b, c, d) == 0;
    a_d_kub(a, b, c, d) == 0
] solve, a, b, c, d → [-367/6000, 4267/280, -121424/105, 1173899/35]
a_kub(x) := a*x^3 + b*x^2 + c*x + d → -367*x^3/6000 + 4267*x^2/280 + (1173899/35 - 121424*x/105)
# 6a)
clear(Y, X, k, d, a, b, c, n_quad, n_lin, n_k_lin, n_d_lin, n_a_quad, n_b_quad, n_c_quad, n)
clear(a, b, k, n, c, d, x, t, X, Y, a_quad, a_lin, a_a_quad, a_b_quad, a_k_lin, a_d_lin, a_t_quad)
X := [60; 70; 80; 90; 100]
Y := [9600; 8402; 7045; 6345; 5125]
n := rows(X) → 5
n_lin(k, d) := sum((k*X[i] + d - Y[i])^2, i = 0 .. n - 1)
n_k_lin(k, d) := d/dk(n_lin(k, d)) → 66000*k + (800*d - 5622580)
n_d_lin(k, d) := d/dd(n_lin(k, d)) → 800*k + (10*d - 73034)
[k, d] := [n_k_lin(k, d) == 0; n_d_lin(k, d) == 0] solve, k, d → [-11007/100, 16109]
n_lin(x) := k*x + d → -11007*x/100 + 16109
clear(Y, X, k, d, a, b, c, n_quad, n_lin, n_k_lin, n_d_lin, n_a_quad, n_b_quad, n_c_quad, n)
clear(a, b, k, n, c, d, x, t, X, Y, a_quad, a_lin, a_a_quad, a_b_quad, a_k_lin, a_d_lin, a_t_quad)
X := [60; 70; 80; 90; 100]
Y := [9600; 8402; 7045; 6345; 5125]
n := rows(X) → 5
n_quad(a, b, c) := sum((a*X[i]^2 + b*X[i] + c - Y[i])^2, i = 0 .. n - 1)
n_a_quad(a, b, c) := d/da(n_quad(a, b, c)) → 66000*c + 5600000*b + (487080000*a - 446924600)
n_b_quad(a, b, c) := d/db(n_quad(a, b, c)) → 800*c + 66000*b + (5600000*a - 5622580)
n_c_quad(a, b, c) := d/dc(n_quad(a, b, c)) → 10*c + 800*b + (66000*a - 73034)
[a, b, c] := [n_a_quad(a, b, c) == 0; n_b_quad(a, b, c) == 0; n_c_quad(a, b, c) == 0] solve, a, b, c → [613/1400, -126089/700, 131766/7]
n_quad(x) := a*x^2 + b*x + c → 613*x^2/1400 + (131766/7 - 126089*x/700)
clear(Y, X, k, d, a, b, c, n_quad, n_lin, n_k_lin, n_d_lin, n_a_quad, n_b_quad, n_c_quad, n)
clear(a, b, k, n, c, d, x, t, X, Y, a_quad, a_lin, a_a_quad, a_b_quad, a_k_lin, a_d_lin, a_t_quad)
# Kapitel 5.3.3 Beispiel 1)
# a)
K(x) := 0.001*x^3 - 0.1*x^2 + 4*x + 50
p := 3
E(x) := p*x → 3*x
G(x) := E(x) - K(x) → -0.001*x^3 + 0.1*x^2 - 1.0*x - 50.0
# b)
# Gewinngrenzen:
P := G(x) == 0 solve, x; float → [79.5160289138; -16.844954207; 37.3289252932]
gewinn_grenze_x := floor(P[0]) → 79
break_even_x := floor(P[2]) → 37
gewinn_grenze_y := G(P[0]) → -(0.120898071353*10^-17)
break_even_y := G(P[2]) → 0.762329652529*10^-20
# Die Gewinngrenze liegt bei 79ME und der Break-Even-Point bei 37 ME.
# c)
# max Gewinn:
G'(x) := d/dx(G(x)) → -0.003*x^2 + 0.2*x - 1.0
G_max := G'(x) == 0 solve, x → [5.4446657822; 61.2220008845]
G_y_max := G(G_max[1]) → 34.123112487
# max Erlös:
E'(x) := d/dx(E(x)) → 3  # Der maximale Gewinn liegt bei 61.22 ME mit 34.12 GE und der maximale Erlös liegt bei 0 ME .
E_x_max := E'(x) == 0 → 0
E_y_max := E(E_x_max) → 0
# Skizze:
# [plot: K(x), G(x), E(x), G_y_max, E_y_max, break_even_y, gewinn_grenze_y vs x, G_max[1], E_x_max, P[2], P[0]]
