# Kapitel 5.3.3 Beispiel 3a-d, 4a-c, 5a-g
# 3a-d)
n(x) := 160 - 2.6*x + 0.01*x^2
K(x) := 0.2*x^2 + 19*x + 1300
n'(x) := d/dx(n(x)) → 0.02*x - 2.6  # kann als n oder p bezeichnet werden.
# a)
E(x) := n(x)*x
G(x) := E(x) - K(x) → x*(0.01*x^2 - 2.6*x + 160.0) - (0.2*x^2 + 19.0*x + 1300.0)
G'(x) := d/dx(G(x)) → 0.03*x^2 - 5.6*x + 141.0
x_max := G'(x) == 0 solve, x; assume, 0 ≤ x ≤ 60 → 30.0 = 30
n(x_max) → 91.0
# Der Courntousche Punkt liegt bei (x_max → 30/n(x_max) → 91.0)
# b)
P := G(x) == 0 solve, x; assume, 0 ≤ x ≤ 60 → [50.0; 11.9223593596]
x_grenze := P[0] → 50.0
M_g := [P[0]; G(P[0])] → [50.0; 0.0]
x_break_even_point := round(P)[1] → 12
M_be := [P[1]; G(P[1])] → [11.9223593596; -(0.364834031041*10^-16)]
# Die untere Gewinnuntergrenze liegt bei x_break_even_point → 12ME und die Gewinnobergrenze liegt bei  x_grenze → 50.0ME.
# c)
c(x) := K(x)/x → (0.2*x^2 + 19.0*x + 1300.0)/x
c'(x) := d/dx(c(x)) → -1.0*1300.0/x^2 + 0.2
c'(x) == 0 solve, x → [-80.622577483; 80.622577483]
x_opt := 80.62
# Der Betrieb wird zu einem Grenzbetrieb, wenn ein Betriebsoptimum von 80.62 ME erreicht wird.
# d)
# [plot: G(x), K(x), n(x), M_be[1], M_g[1] vs x, M_be[0], M_g[0]]
clear(x_max, K, c', c, n, n', E, E', G, G', k, d, a, b)
# 4a-c)
# a)
K(x) := a*x^2 + b*x + l  # error: Diese Variable ist nicht definiert. Prüfen Sie, ob die Beschriftung richtig festgelegt ist.
n(x) := k*x + d  # error: Diese Variable ist nicht definiert. Prüfen Sie, ob die Beschriftung richtig festgelegt ist.
n'(x) := d/dx(n(x)) → k
# Bedingungen lineare Nachfragefunktion:
# I: n(400) = 100
# II: -1 * n(10400)/10400*n'(10400)
[k, d] := [n(400) == 100; -n(400)/(400*n'(400)) == 5] solve, k, d → [-1/20, 120]
n(x) := k*x + d → -x/20 + 120
E(x) := x*n(x) → x*(-x/20 + 120)
G(x) := E(x) - K(x) → x*(-x/20 + 120) - (a*x^2 + b*x + l)
G'(x) := d/dx(G(x)) → -(2*a*x) + (120 - b - x/10)
c(x) := K(x)/x → (a*x^2 + b*x + l)/x
c'(x) := d/dx(c(x)) → a - l/x^2
# Bedingungen:
# I: G '(400) = 0
# II: G (400) = 10400
# III: c'(200) = 0
[a, b, l] := [G'(400) == 0; G(400) == 10400; c'(200) == 0] solve, a, b, l → [1/50, 64, 800]
K(x) := a*x^2 + b*x + l → x^2/50 + 64*x + 800
G(x) := E(x) - K(x) → x*(-x/20 + 120) - (x^2/50 + 64*x + 800)
# b)
G(x) == 0 solve, x; float, 6 → [14.5504; 785.45]
x_ober := 785
x_unter := 15
# Die Preisuntergrenze (Break-Even-Point) liegt bei x_unter → 15ME und die obere Preisgrenze bei x_ober → 785 ME.
# c)
E(x) := x*n(x) → x*(-x/20 + 120)
E'(x) := d/dx(E(x)) → -x/10 + 120
e_max := E'(x) == 0 solve, x → 1200
E(e_max) → 72000  # Der maximale Erlös wird bei einer Stückzahl von 1200 ME erreicht und beträgt 72000 GE.
clear(x_max, K, K', K'', c', c, n, n', E, E', G, G', k, d, a, b, l, z)
# 5a-g)
# a)
K(x) := a*x^2 + b*x + z  # error: Diese Variable ist nicht definiert. Prüfen Sie, ob die Beschriftung richtig festgelegt ist.
n(x) := k*x + d  # error: Diese Variable ist nicht definiert. Prüfen Sie, ob die Beschriftung richtig festgelegt ist.
n'(x) := d/dx(n(x)) → k
# Bedingungen lineare Nachfragefunktion:
# I: n(0) = 170
# II: -1*(n(16000))/(16000*n'(16000)) = 1.12
[k, d] := [n(0) == 170; -n(16000)/(16000*n'(16000)) == 1.12] solve, k, d → [-0.00501179245283, 170.0]
n(x) := k*x + d → -0.00501179245283*x + 170.0
E(x) := n(x)*x → x*(-0.00501179245283*x + 170.0)
G(x) := E(x) - K(x) → x*(-0.00501179245283*x + 170.0) - (1.0*z + 1.0*a*x^2 + 1.0*b*x)
G'(x) := d/dx(G(x)) → (-2.0*a - 0.0100235849057)*x + (170.0 - 1.0*b)
K'(x) := d/dx(K(x)) → 2*a*x + b
# Bedingungen für die quadratische Kostenfunktion:
# I: K'(10000) = 180
# II: K(5000) = 605000
# III: G'(4500) = 0
[a, b, z] := [K'(10000) == 180; K(5000) == 605000; G'(4500) == 0] solve, a, b, z → [0.0050096483705, 79.8070325901, 80723.6277873]
K(x) := a*x^2 + b*x + z → 0.0050096483705*x^2 + 79.8070325901*x + 80723.6277873
# b)
c(x) := K(x)/x → (0.0050096483705*x^2 + 79.8070325901*x + 80723.6277873)/x
c'(x) := d/dx(c(x)) → -1.0*80723.6277873/x^2 + 0.0050096483705
x_opt := c'(x) solve, x → [-4014.17880769; 4014.17880769]
y_min := c(x_opt[1]) → 120.026281236
# Das Betriebsoptimum liegt bei 4014.18 ME und die minimalen Stückkosten betragen: y_min float, 5 → 120.03GE/ME.
# c)
K'(x) := d/dx(K(x)) → 0.010019296741*x + 79.8070325901
K''(x) := d/dx(K'(x)) → 0.010019296741
# Eine Kostenkehre ist nicht vorhanden.
# d)
G(x) := E(x) - K(x) → x*(-0.00501179245283*x + 170.0) - (0.0050096483705*x^2 + 79.8070325901*x + 80723.6277873)
G'(x) := d/dx(G(x)) → -0.0200428816467*x + 90.1929674099
x_max := G'(x) == 0 solve, x → 4500.0
G(4500) → 122210.548885
# Der Maximale Gewinn wird bei einer Menge von 4500 ME erzielt und beträgt 122210.55 GE.
# e)
G(x) == 0 solve, x → [1007.87915419; 7992.12084581]
x_break := 1008
# Der Break-Even-Point ist bei 1008 ME und die Gewinngrenze bei 7992.
x_oben := 7992
# f)
E(x) := x*n(x) → x*(-0.00501179245283*x + 170.0)
E'(x) := d/dx(E(x)) → -0.0100235849057*x + 170.0
x_e := E'(x) == 0 solve, x → 16960
y_e := E(x_e) → 1441600
# Der maximale Erlös wird bei 1690 ME erreicht und beträgt 1441600 GE.
# g)
n'(x) := d/dx(n(x)) → -0.00501179245283
x_max := G'(x) == 0 solve, x → 4500.0
y_max := n(x_max) → 147.446933962
η(x) := -1*n(x)/(x*n'(x)) → (-1.0*x + 33920)/x
η(x_max) float, 3 → 6.54
# Die Elastizität beträgt 6.54, d.h. elastisch.
