# Beispiel:
x^2 + y^2 == r^2
# Lösung
f(x) := x^2 + y^2 == r^2 solve, y → [sqrt(-x^2 + r^2); -sqrt(-x^2 + r^2)]
f'(x) := d/dx(f(x)[0]) → -x/sqrt(-x^2 + r^2)
1 + f'(x)^2 → -r^2/(x^2 - r^2)
l := 4*integral(sqrt(-r^2/(x^2 - r^2)), x = 0 .. r) simplify → {
    if not (r ≥ 0 or -(2*r) ≥ 0) or r ≤ 0
        2*π*|r|
    else
        undefined
}
