# Beipsiel 1 Kapitel 5.3.3
# a)
K(x) := 0.001*x^3 - 0.1*x^2 + 4*x + 50
p := 3
E(x) := p*x → 3*x
G(x) := E(x) - K(x) → -0.001*x^3 + 0.1*x^2 - 1.0*x - 50.0
# b)
# Gewinngrenzen:
P := G(x) == 0 solve, x; float → [79.5160289138; -16.844954207; 37.3289252932]
gewinn_grenze_x := floor(P[0]) → 79
break_even_x := floor(P[2]) → 37  # obere abzrunden -> untere aufzurunden
gewinn_grenze_y := G(P[0]) → -(0.120898071353*10^-17)
break_even_y := G(P[2]) → 0.762329652529*10^-20
# Die Gewinngrenze liegt bei 79ME und der Break-Even-Point bei 38 ME.
# c)
# max Gewinn:
G'(x) := d/dx(G(x)) → -0.003*x^2 + 0.2*x - 1.0
G_max := G'(x) == 0 solve, x → [5.4446657822; 61.2220008845]
# Der wert der im Gewinnbereich liegt also zwischen: 38 und 79ME
G_y_max := G(G_max[1]) → 34.123112487
# max Erlös:
E'(x) := d/dx(E(x)) → 3  # Der maximale Gewinn liegt bei 61.22 ME mit 34.12 GE. Es gibt keinen maximalen Erlös.
E_x_max := E'(x) == 0 → 0
E_y_max := E(E_x_max) → 0
# Skizze:
# [plot: K(x), G(x), E(x), G_y_max, E_y_max, break_even_y, gewinn_grenze_y vs x, G_max[1], E_x_max, P[2], P[0]]
# Beispiel 2)
G(x) := -7*x^2 + 840*x - 7700
n(x) := a*x + b  # error: Diese Variable ist nicht definiert. Prüfen Sie, ob die Beschriftung richtig festgelegt ist.
p_H := 1050
x_S := 480
# Bedingungen: n(0)
[a, b] := [n(0) == p_H; n(x_S) == 0] solve, a, b → [-35/16, 1050]
n(x) := a*x + b → -35*x/16 + 1050
E(x) := n(x)*x → x*(-35*x/16 + 1050)
K(x) := E(x) - G(x) → x*(-35*x/16 + 1050) + 7*x^2 - 840*x + 7700
# 2)
G(x) == 0 solve, x → [110; 10]
# untere Gewinngrenze (break even Punkt): 10 und obere Gewinngrenze liegt bei 110 ME
# 3)
G'(x) := d/dx(G(x)) → -(14*x) + 840
E'(x) := d/dx(E(x)) → -35*x/8 + 1050
x_max := G'(x) == 0 solve, x → 60
G(60) → 17500
# man checkt ob die Steigung in dem Punkt 0 ist
E'(x) == 0 solve, x → 240
E(240) → 126000
# Der maximale Erlös liegt bei
c(x) := K(x)/x → (x*(-35*x/16 + 1050) + 7*x^2 - 840*x + 7700)/x
c'(x) := d/dx(c(x)) → -7700/x^2 + 77/16
c'(x) == 0 solve, x → [40; -40]
# Bei einer Produktionsmenge von 40ME werden alle Kosten gedeckt.
# konoasche Punkt
# f)
n(x_max) float, 8 → 918.75
n'(x) := d/dx(n(x)) → -35/16
# Der Courntousche Punkt C(60/918.75)
# In allen drei Fällen ist die Nachfrage elastisch, das heißt das eine Preisänderung auch eine Nachfrageänderung bewirkt.
eta(x) := -n(x)/(x*n'(x)) → (-x + 480)/x
eta(10) → 47
eta(30) → 15
eta(50) → 43/5
# [plot: G(x), K(x), E(x), n(x), eta(x) vs x]
