# Hü Beispiele
# 4a-c)
# a)
K(x) := a*x^2 + b*x + l  # error: Diese Variable ist nicht definiert. Prüfen Sie, ob die Beschriftung richtig festgelegt ist.
n(x) := k*x + d  # error: Diese Variable ist nicht definiert. Prüfen Sie, ob die Beschriftung richtig festgelegt ist.
n'(x) := d/dx(n(x)) → k
# Bedingungen lineare Nachfragefunktion:
# I: n(400) = 100
# II: -1 * n(10400) / 10400 * n'(10400)
[k, d] := [n(400) == 100; -n(400)/(400*n'(400)) == 5] solve, k, d → [-1/20, 120]
n(x) := k*x + d → -x/20 + 120
E(x) := x*n(x) → x*(-x/20 + 120)
G(x) := E(x) - K(x) → x*(-x/20 + 120) - (a*x^2 + b*x + l)
G'(x) := d/dx(G(x)) → -(2*a*x) + (120 - b - x/10)
c(x) := K(x)/x → (a*x^2 + b*x + l)/x
c'(x) := d/dx(c(x)) → a - l/x^2
# Bedingungen:
# I: G'(400) = 0
# II: G(400) = 10400
# III: c'(200) = 0
[a, b, l] := [G'(400) == 0; G(400) == 10400; c'(200) == 0] solve, a, b, l → [1/50, 64, 800]
K(x) := a*x^2 + b*x + l → x^2/50 + 64*x + 800
clear(x_max, K, K', K'', c', c, n, n', E, E', G, G', k, d, a, b, l, z, eta)
# Beispiel 5)
K(x) := a*x^2 + b*x + z  # error: Diese Variable ist nicht definiert. Prüfen Sie, ob die Beschriftung richtig festgelegt ist.
n(x) := k*x + d  # error: Diese Variable ist nicht definiert. Prüfen Sie, ob die Beschriftung richtig festgelegt ist.
n'(x) := d/dx(n(x)) → k
# Bedingungen lineare Nachfragefunktion:
# I: n(0) = 170
# II: eta(16000) = 1.12
[k, d] := [n(0) == 170; -n(16000)/(16000*n'(16000)) == 9/8] solve, k, d → [-1/200, 170]
n(x) := k*x + d → -x/200 + 170
E(x) := n(x)*x → x*(-x/200 + 170)
G(x) := E(x) - K(x) → x*(-x/200 + 170) - (z + a*x^2 + b*x)
G'(x) := d/dx(G(x)) → -(2*a*x) + (170 - b - x/100)
K'(x) := d/dx(K(x)) → 2*a*x + b
# Bedingungen für die quadratische Kostenfunktion:
# I: K'(10000) = 180
# II: K(5000) = 605000
# III: G'(4500) = 0
[a, b, z] := [K'(10000) == 180; K(5000) == 605000; G'(4500) == 0] solve, a, b, z → [1/200, 80, 80000]
K(x) := a*x^2 + b*x + z → x^2/200 + 80*x + 80000
