# 2)
# a)
f''(x) := 6*x - 6
f'_n(x) := integral(f''(x), x) → 3*x*(x - 2)
f'(x) := f'_n(x) + C → 3*x*(x - 2) + C
f_n(x) := integral(f'(x), x) → x*(x^2 - 3*x + C)
f(x) := f_n(x) + C_2 → x*(x^2 - 3*x + C) + C_2
# Bedingungen:
# I: f'(3) = 9
# II: f(0) = 4
[C, C_2] := [f'(3) == 9; f(0) == 4] solve, C, C_2 → [0, 4]
f(x) := x*(x^2 - 3*x + C) + C_2 expand → x^3 - 3*x^2 + 4
clear(f', f'', f, a, b, c)
# b)
f(x) := -1*1/98*x^2 + 2
f'(x) := d/dx(f(x)) → -x/49
S := f(x) == 0 solve, x → [14; -14]
l := integral(sqrt(1 + f'(x)^2), x = S[1] .. S[0]) → -(98*ln(7*sqrt(53) - 14) + (57 - 98*ln(49)))/2 - 2401/(8*sqrt(53) - 114)
l_1 := c^2 == 14^2 + 70^2 solve, c; float; assume, c > 0 → 71.3862731903
Laenge := (l + l_1*2)*1.05 → -1.05*14.6838012797 + 195.124404467
# Die länge beträgt Laenge float, 5 → 179.71 cm
clear(f', f'', f, a, b, c)
# c)
f(x) := 1/72*x^3 - 1/3*x^2 + 2*x + 29/9
f'(x) := d/dx(f(x)) → (x^2 - 16*x)/24 + 2
P := f'(x) == 0 solve, x → [12; 4]
# [plot: f(x)*(1 ≤ x ≤ 16), -f(x)*(1 ≤ x ≤ 16) vs x, P[0], P[1]]
V_x := π*integral(f(x)^2, x = 1 .. 16 - 3) float, 6 → 1064.03
V_cm := V_x*10^-3 → 1.06403
# Wenn die Wase bis zum Rand befüllt ist, befinden sich 1.06l Wasser in der Wase.
d_1 := f(P[1])*2 float, 4 → 13.56
d_2 := f(P[0])*2 float, 3 → 6.44
# Die Vase ist an der breitesten Stelle 13.56 cm breit und an der schmalsten Stelle 6.44 cm breit.
# Beispiel 3)
f(x) := 1500*1.018^x
# [plot: f(x) vs x]
m := 1/10*integral(f(x), x = 0 .. 10) → 1642.12386186
# Nach 10 Jahren wohnen Durchschnittlich 1642 Einwohner in diesem Ort.
# b)
# i)
f(x) := 1/25*x^4 - 8/25*x^3 + 16/5*x - 3/5
f'(x) := d/dx(f(x)) → (4*x^3 - 24*x^2 + 80)/25
f''(x) := d/dx(f'(x)) → (12*x^2 - 48*x)/25
f''(x) == 0 solve, x → [0; 4]
# Die Wendepunkte der Funktion liegen bei W1(4/-3/5) und W2(4/49/25).
W_1 := [0; f(0)] → [0; -3/5]
W_2 := [4; f(4)] → [4; 49/25]
# ii)
g(x) := a*x + b  # error: Diese Variable ist nicht definiert. Prüfen Sie, ob die Beschriftung richtig festgelegt ist.
[a, b] := [g(0) == -3/5; g(4) == 49/25] solve, a, b → [16/25, -3/5]
g(x) := a*x + b → 16*x/25 - 3/5
# [plot: f(x), g(x), W_1[1], W_2[1] vs x, W_1[0], W_2[0]]
S := f(x) == g(x) solve, x; float; assume, x == real → [0.0; 4.0; 6.472135955; -2.472135955]
Flaeche := |integral(f(x) - g(x), x = S[3] .. S[0])| + |integral(g(x) - f(x), x = S[0] .. S[1])| + |integral(g(x) - f(x), x = S[1] .. S[2])| float, 4 → 16.38
# Die Fläche der eingeschlossenen Funktion beträgt 16.38 FE.
clear(a, b, c, d)
# Beispiel 4)
K(x) := a*x^3 + b*x^2 + i*x + d  # error: Diese Variable ist nicht definiert. Prüfen Sie, ob die Beschriftung richtig festgelegt ist.
K'(x) := d/dx(K(x)) expand → 3*a*x^2 + 2*b*x + i
K''(x) := d/dx(K'(x)) expand → 6*a*x + 2*b
c(x) := K(x)/x expand → a*x^2 + b*x + i + d/x
c'(x) := d/dx(c(x)) expand → 2*a*x + b - d/x^2
# Bedingungen:
# I: c'(25) = 0
# II: K(25) = 22500
# III:K'(10) = 450
# IIII:K''(10) = 0
[a, b, i, d] := [c'(25) == 0; K(25) == 22500; K'(10) == 450; K''(10) == 0] solve, a, b, i, d → [2/3, -20, 650, 25000/3]
K(x) := a*x^3 + b*x^2 + i*x + d expand → 2*x^3/3 - 20*x^2 + 650*x + 25000/3
clear(n, k, a, d, c, b)
# b)
X := [20; 40; 60; 100; 160; 200]
Y := [375; 205; 195; 120; 100; 90]
n := rows(X) → 6
K(k, d) := sum((k*X[i] + d - Y[i])^2, i = 0 .. n - 1)
K_k(k, d) := d/dk(K(k, d)) → 162400*k + (1160*d - 146800)
K_d(k, d) := d/dd(K(k, d)) → 1160*k + (12*d - 2170)
[k, d] := [K_k(k, d) == 0; K_d(k, d) == 0] solve, k, d → [-1889/1508, 3925/13]
K(x) := k*x + d float, 6 → -1.0*1.25265*x + 301.923
K(x) == -1.25*x + 301.92
# c)
K(x) := 0.2*x^2 + 8*x + 280 - 500/(x + 4)
n(x) := -4*x + 220
# i)
K(0) → 155.0
# Die fixen Kosten betragen 155GE
# ii)
E(x) := n(x)*x → x*(-(4*x) + 220)
G(x) := E(x) - K(x) → 500.0/(x + 4.0) + (x*(220.0 - 4.0*x) - (0.2*x^2 + 8.0*x + 280.0))
P := G(x) == 0 solve, x → [-3.5381799389; 0.848593253891; 49.1657771612]
# Der Break-Even Point liegt bei 1 ME und die maximale Gewinngrenze liegt bei 49 ME.
# iii)
c(x) := K(x)/x expand → -1.0*500.0/(x^2 + 4.0*x) + 0.2*x + 280.0/x + 8.0
c'(x) := d/dx(c(x)) expand → 0.330872245021*10^-23*x/(x^2 + 8.0*x + 16.0) - (2480.0/(x^4 + 8.0*x^3 + 16.0*x^2) + 1240.0/(x^3 + 8.0*x^2 + 16.0*x) + 280.0/(x^2 + 8.0*x + 16.0)) + 0.2
x_opt := c'(x) == 0 solve, x; assume, x > 0 → 35.7861058107
# Das Betriebsoptimum liegt bei 35.79 ME.
D := c(x_opt) → 22.6303114204
# Die Durchschnittskosten liegen bei 22.63 GE/ME.
# iiii)
G'(x) := d/dx(G(x)) expand → -1.0*(0.847032947254*10^-21*x/(x^2 + 8.0*x + 16.0) + 500.0/(x^2 + 8.0*x + 16.0)) - 1.0*8.4*x + 212.0
x_max := G'(x) solve, x; assume, x > 0 → 25.16813142
n(x_max) → 119.32747432
# Der Countersche Punkt liegt bei 25.17 ME und bei 119.33 GE.
