# Beispiel 1):
kreis(x) := (x - 3)^2 + y^2 == 20 solve, y → [sqrt(-x^2 + 6*x + 11); -sqrt(-x^2 + 6*x + 11)]
g(x) := 3*x + 1
# Lösung:
# Schnittpunkte:
S_1 := [1; kreis(1)[0]] → [1; 4]
kreis(x)[0] == g(x) solve, x → 1
S_2 := [-1; kreis(-1)[1]] → [-1; -2]
kreis(x)[1] == g(x) solve, x → -1
# Länge der Sehne:
S1S2 := S_2 - S_1 → [-2; -6]
|S1S2| float → 6.32455532034
# Die Schnittpunkte sind gegeben durch S1(1/4) und S2(-1/2) und die Länge der Sehne beträgt: 6.33 cm
# Tangentengleichungen berechnen -> Tangentengleichung
# xT = Punkt wo die Tangente ist
# xM = Mittelpunkt
x_m := 3
r := sqrt(20)
y_m := 0
t_1(x) := (x - x_m)*(S_1[0] - x_m) + (y - y_m)*(S_1[1] - y_m) == r^2 solve, y → (x + 7)/2
t_2(x) := (x - x_m)*(S_2[0] - x_m) + (y - y_m)*(S_2[1] - y_m) == r^2 solve, y → -(2*x) - 4
# Schnittpunkt der Tangenten:
t_1(x) == t_2(x) solve, x → -3
S_3 := [-3; t_1(-3)] → [-3; 2]
# Grafik
# [plot: kreis(x)[0], kreis(x)[1], g(x), t_1(x), t_2(x) vs x]
# Zeigen Sie, dass S1,S2,S3 Gleichschenkelig
k_1 := 1/2
α_1 := tan(α_1) == k_1 solve, α_1 → atan(1/2) = 26.5651 deg
k_2 := -2
α_2 := tan(α_2) == k_2 solve, α_2 → -atan(2) = -63.4349 deg
α := α_1 - α_2 → 90*deg
# Der Winkel ist 90 Grad, d.h. die beiden Tangenten stehen senkrecht zueinander
# 2te Variante)
S3S1 := S_1 - S_3 → [4; 2]
a := S3S1 → [4; 2]
S3S2 := S_2 - S_3 → [2; -4]
b := S3S2 → [2; -4]
cos(β) == (a*b)/(|b|*|a|) solve, β → π/2
|a| → 2*sqrt(5)
|b| → 2*sqrt(5)
# Die Seiten sind gleich lang, daher handelt es sich um ein gleichschenkeliges Dreieck.
