# 2) 5) 6), Buchbeispiele: 1.23), 1.78), 1.81)
# 2)
ellipse(x) := 3*x^2 + 5*y^2 == 120 solve, y → [sqrt(-(15*x^2) + 600)/5; -sqrt(-(15*x^2) + 600)/5]
P_1 := [5; ellipse(5)[0]] → [5; 3]
# so kommt man auf a und b:
# hier nimmt man die allgemeine ellipsengleichung: x^2/a^2 + y^2/b^2 = 1
a_el := sqrt(120/3)
b_el := sqrt(120/5)
e_el := sqrt(a_el^2 - b_el^2) → 4
# Bedingungen
[a, b] := [5^2/a^2 - 3^2/b^2 == 1; 4^2 == a^2 + b^2] solve, a, b; assume, a == real; assume, b == real; assume, a > 0; assume, b > 0 → [sqrt(10), sqrt(6)]
hyperbel(x) := x^2/a^2 - y^2/b^2 == 1 solve, y → [-sqrt(15*x^2 - 150)/5; sqrt(15*x^2 - 150)/5]
# 5)
P := [x; 2]  # error: Diese Variable ist nicht definiert. Prüfen Sie, ob die Beschriftung richtig festgelegt ist.
parabel(x) := y^2 == 2*x solve, y → [sqrt(2*x); -sqrt(2*x)]
g(x) := -0.5*x + d  # error: Diese Variable ist nicht definiert. Prüfen Sie, ob die Beschriftung richtig festgelegt ist.
parabel(x)[0] == 2 solve, x → 2
P := [2; 2]
d := g(2) == 2 solve, d → 3.0
g(x) := -0.5*x + d → -0.5*x + 3.0
(x - x_m)^2 + (y - y_m)^2 == r^2
(2 - 0)^2 + (2 - 3)^2 == r^2 solve, r → [-sqrt(5); sqrt(5)]
r := (2 - 0)^2 + (2 - 3)^2 == r^2 solve, r; assume, r > 0 → sqrt(5)
kreis(x) := (x - 0)^2 + (y - 3)^2 == r^2 solve, y → [sqrt(-x^2 + 5) + 3; -sqrt(-x^2 + 5) + 3]
# [plot: kreis(x)[0], kreis(x)[1], g(x) vs x]
clear(hyperbel, kreis, g, y, x, r, hyp, e, a_hyp, b_hyp)
# 6)
hyperbel(x) := 9*x^2 - 16*y^2 == 36  # error: Diese Variable ist nicht definiert. Prüfen Sie, ob die Beschriftung richtig festgelegt ist.
M := [0; 25/8]
a_hyp := sqrt(36/9)
b_hyp := sqrt(36/16)
e := sqrt(a_hyp^2 + b_hyp^2) → 5/2
r := (0 - 25/8)^2 + (0 - e)^2 == r^2 solve, r; assume, r > 0 → 5*sqrt(41)/8
kreis(x) := (x - 0)^2 + (y - 25/8)^2 == r^2 solve, y → [(sqrt(-(64*x^2) + 1025) + 25)/8; (-sqrt(-(64*x^2) + 1025) + 25)/8]
hyp(x) := hyperbel(x) solve, y → [-sqrt(144*x^2 - 576)/16; sqrt(144*x^2 - 576)/16]
# [plot: kreis(x)[0], kreis(x)[1], hyp(x)[0], hyp(x)[1] vs x]
f_asymptote(x) := [-b_hyp/a_hyp*x; b_hyp/a_hyp*x] → [-(3*x)/4; 3*x/4]
S_x := kreis(x)[1] == f_asymptote(x)[0] solve, x → [-4; 1]
S_x1 := kreis(x)[1] == f_asymptote(x)[1] solve, x → [-1; 4]
S_1 := [S_x[0]; kreis(S_x[0])[1]] → [-4; 3]
S_2 := [S_x[1]; kreis(S_x[1])[1]] → [1; -3/4]
S_3 := [S_x1[0]; kreis(S_x1[0])[1]] → [-1; -3/4]
S_4 := [S_x1[1]; kreis(S_x1[1])[1]] → [4; 3]
clear(c, a, b)
# 1.23), 1.78), 1.81)
x_0 := 5
t_p(x) := -x + 7
y(x) := a*x^2 + b*x + c  # error: Diese Variable ist nicht definiert. Prüfen Sie, ob die Beschriftung richtig festgelegt ist.
t_p(3) → 4
y'(x) := d/dx(y(x)) → 2*a*x + b
[a, b, c] := [y(5) == 0; y(3) == 4; y'(3) == -1] solve, a, b, c → [-1/2, 2, 5/2]
y(x) := a*x^2 + b*x + c → -x^2/2 + 5/2 + 2*x
y'(x) := d/dx(y(x)) → -x + 2
y'(x) == 0 solve, x → 2
S := [2; y(2)] → [2; 9/2]
y''(x) := d/dx(y'(x)) → -1
# Rechtskrümmung -> nach rechts gekrümmt
r(x) := (1 + y'(x)^2)^1.5/|y''(x)| → ((-1.0*x + 2.0)^2 + 1.0)^1.5
r(2) → 1.0  # krümmungsradius = 1
# [plot: y(x), t_p(x), S[0] vs x, S[1]]
# 1.78)
f(x) := -0.0576*x^4 + 0.2*x^2 + 1
g(x) := 0.08*x^2 - 1
# 1)
# unten -> g(x)
# oben -> f(x)
l := 5
h(x) := 1.55
# [plot: f(x), g(x), h(x) vs x]
b := f(x) - g(x) == 1.55 solve, x; assume, x == real → [2.00612712829; -2.00612712829]
# Die Breite des Monitors beträgt 2*b[0] float, 3 → 4.01m
A_K := integral(f(x) - g(x), x = -2.5 .. 2.5) → 9.0
A_M := 1.55*2*b[0] → 6.21899409769
A_K/A_M → 1.44717937638
# Die Gesamtfläche steht im verhältnis zum monitor ~1:1.45
# 1.81)
# 1)
y(x) := 0.2*(x^2 + 1)^2 + 0.8
x^2 == -1 + sqrt((y - 0.8)/0.2)
# 2)
V := π*integral(-1 + sqrt((y - 0.8)/0.2), y = 1 .. 5) = 27.3252  # In ein 4cm hohes Glas gehen sich 27.325 ml Flüssigkeit aus.
# 3)
V := π*integral(-1 + sqrt((y - 0.8)/0.2), y = 1 .. 5.8) = 36.8614  # Nein es ist nicht möglich in das glas mit 5.8 cm 40ml zu füllen.
