# 4.75) Funktionsgraphen + Fortsetzung der Rechnung
R := 10
L := 2
υ := 150
ω := 200
C(t) := integral((sin(ω*t)*υ)/L*e^(R/L*t), t) → -(15*sqrt(1601)*cos(atan(1/40) + 200*t)*e^(5*t))/1601
# allgemeine Lösung
i(t) := e^(-R/L*t)*C(t) simplify → -(15*sqrt(1601)*cos(atan(1/40) + 200*t))/1601
i_h(t) := 0.374*e^(-5*t)
# 2)
# [plot: i(t), i_h(t) vs t]
# 2)
i(t) := e^(-R/L*t)*C(t) simplify → -(15*sqrt(1601)*cos(atan(1/40) + 200*t))/1601
i_h(t) := 0.374*e^(-5*t)
i_a(t) := i(t) + i_h(t) → 0.374*e^(-5.0*t) - 0.374882867403*cos(200.0*t + 0.0249947936189)
# [plot: i_a(t) vs t]
# Es wird eine Verschiebung der Schwingung in positive y-Richtung erzielt.
