# Beispiel 1.42), 1.50), 1.51), 1.74), 1.80), 1.82), 1.88), 1.99), 1.100 1-4), 1.101ab)
# 1.50)
K(x) := x^3 - 25*x^2 + 250*x + 1000
# 1)
K'(x) := d/dx(K(x)) → 3*x^2 - 50*x + 250
K''(x) := d/dx(K'(x)) → 6*x - 50
K'''(x) := d/dx(K''(x)) → 6
x_kehre := K''(x) == 0 solve, x → 25/3
P := [x_kehre; K(x_kehre)] float → [8.33333333333; 1925.92592593]
# Die Kostenkehre liegt bei 8.33 ME
K'''(P[0]) → 6
# [plot: K(x), P[1] vs x, P[0]]
# 2)
E(x) := p*x  # error: Diese Variable ist nicht definiert. Prüfen Sie, ob die Beschriftung richtig festgelegt ist.
p(x) := E(x) - K(x) solve, p; assume, p == real → (x^3 - 25*x^2 + 250*x + 1000)/x
p(8) → 239  # GE
E(x) := p(8)*x → 239*x
G(x) := E(x) - K(x) → -x^3 + 25*x^2 - 11*x - 1000
G'(x) := d/dx(G(x)) → -(3*x^2) + 50*x - 11
x_max := G'(x) == 0 solve, x; assume, x > 1; float → 16.4436833737
G(x_max) float, 7 → 1132.702  # GE
# 1.74)
v(t) := 6.2*t*e^(-1.4*t)
# [plot: v(t) vs t]
# Durch das Integral  wird die fließende Wassermenge in m^3 im Intervall [10s; 40s] berechnet-
integral(v(t), t = 10 .. 40) → 3.94551892228e-5
# 2)
v'(t) := d/dt(v(t)) → (-8.68*t + 6.2)*e^(-1.4*t)
t_max := v'(t) == 0 solve, t → 0.714285714286
# Die Durchflussgeschwindigkeit ist zum Zeitpunkt t = 0.71s maximal
integral(v(t), t = 0 .. t_max) → 0.835864759936
# Bis zur maximalen Durchflussgeschwindigkeit sind 0.84 m^3 geflossen.
# 1.80)
clear(k, d, f)
f(x) := -sqrt(0.5*(4 - x))
q(y) := y == -sqrt(0.5*(4 - x)) solve, x → -2.0*y^2 + 4.0
g(x) := k*x + d  # error: Diese Variable ist nicht definiert. Prüfen Sie, ob die Beschriftung richtig festgelegt ist.
[k, d] := [g(4) == 0; g(0) == 4] solve, k, d → [-1, 4]
g(x) := k*x + d → -x + 4
q_1(y) := y == k*x + d solve, x → -y + 4
y_0 := f(0) → -1.41421356237
# [plot: f(x), g(x) vs x]
V_1 := π*integral(q(y)^2, y = y_0 .. 0) → 37.9126010723
V_2 := π*integral(q_1(y)^2, y = 0 .. 4) → 64*π/3
V_ges := V_1 + V_2 → 104.933244349
p := 8.7
p == m/V_ges solve, m → 912.919225835
# Die Masse beträgt 912.92g.
# 1.82)
clear(d, k, f, p, q, x_0, a, b, c, d, m, V, p)
k := -3/2
f(x) := a*x^3 + b*x^2 + c*x + d  # error: Diese Variable ist nicht definiert. Prüfen Sie, ob die Beschriftung richtig festgelegt ist.
f'(x) := d/dx(f(x)) → 3*a*x^2 + 2*b*x + c
f''(x) := d/dx(f'(x)) → 6*a*x + 2*b
t(x) := k*x + d_2  # error: Diese Variable ist nicht definiert. Prüfen Sie, ob die Beschriftung richtig festgelegt ist.
d_2 := t(4) solve, d_2 → 6
t(x) := k*x + d_2 → -3*x/2 + 6
[a, b, c, d] := [f(2) == 5; f'(2) == 0; f''(4) == 0; f'(4) == -3/2] solve, a, b, c, d → [1/8, -3/2, 9/2, 1]
f(x) := a*x^3 + b*x^2 + c*x + d float → 0.125*x^3 + (4.5*x + 1.0 - 1.0*1.5*x^2)
# [plot: f(x) vs x]
A := integral(f(x), x = 1 .. 7) → 18.0  # cm^2
V_x := π*integral(f(x)^2, x = 1 .. 7) → 213.042056815
p := 1.05  # g/cm^3
p == m/V_x solve, m → 223.694159656  # Die Masse des Körpers beträgt 223.69g.
# 1.88)
clear(d, k, f, f', f'', p, q, x_0, a, b, c, d, m, V, p)
f(x) := a*x^3 + b*x^2 + c*x + d  # error: Diese Variable ist nicht definiert. Prüfen Sie, ob die Beschriftung richtig festgelegt ist.
f'(x) := d/dx(f(x)) → 3*a*x^2 + 2*b*x + c
f''(x) := d/dx(f'(x)) → 6*a*x + 2*b
[a, b, c, d] := [f'(0.5) == 0; f(0.5) == 1.5; f(-2.5) == 0; f(2) == 0] solve, a, b, c, d → [-0.111111111111, -0.333333333333, 0.416666666667, 1.38888888889]
f(x) := a*x^3 + b*x^2 + c*x + d float, 3 → -0.111*x^3 - 0.333*x^2 + 0.417*x + 1.39
f'(x) := 3*a*x^2 + 2*b*x + c
# [plot: f(x), -f(x) vs x]
l_1 := 3
l_2 := integral(sqrt(1 + f'(x)^2), x = -4 .. 2) → 7.88944932272
l_ges := l_1 + l_2*2 → 18.7788986454
# Die Bogenlänge beträgt etwa: 18.78 cm.
clear(d, k, f, f', f'', p, q, x_0, a, b, c, d, m, V, p)
# 1.99)
f(x) := 1 + cos(2*π/3*x)
# [plot: f(x), 1 vs x, 3/4]
x_start := f(x) == 1 solve, x → 3/4
x_end := 3 - 3/4 → 9/4
x_length := x_end - x_start → 3/2
A := integral(1 - f(x), x = 3/4 .. 9/4) float → 0.954929658551
V := A*10 → 9.54929658551  # m^3
# Im Kanal sind ca. 95.49 hl.
# 1.100 1-4)
a(t) := 0.0036*t^2 - 0.18*t + 2.25
v(t) := integral(a(t), t) + 3 expand → 0.0012*t^3 - 0.09*t^2 + 2.25*t + 3.0
integral(v(t), t = 0 .. 25) → 426.5625
v(25) → 21.75  # m/s^2
# Der Term beschreibt die Änderung der Geschwindigkeit im Intervall [0;25s].
clear(t)
s(t) := integral(v(t), t) expand → 0.0003*t^4 - 0.03*t^3 + 1.125*t^2 + 3.0*t
s(t) == 200 solve, t; assume, t == real; assume, t > 0 → 14.409844579
# Die Drohne hat einen Weg von 200 m nach etwa 14.41s zurückgelegt.
# 1.101ab)
q(y) := y == sqrt(x - 3) solve, x → y^2 + 3
y(x) := sqrt(x - 3)
x_1 := sqrt(x - 3) == 0 solve, x → 3
y_2 := y(7) → 2
P_1 := [x_1; 0] → [3; 0]
P_2 := [7; y_2] → [7; 2]
# [plot: y(x), P_1[1], P_2[1] vs x, P_1[0], P_2[0]]
# (a) | (b)
V_x := π*integral(y(x)^2, x = 3 .. 7) float, 4 → 25.13  # E^3
V_y := π*integral(q(y)^2, y = 0 .. 2) float, 5 → 126.92  # E^3
# 1.51)
E == I/r^2*cos(α)
cos(α) == h/r
r := sqrt(h^2 + 4)  # error: Diese Einheiten sind nicht kompatibel.
E(h) := I/r^2*h/r → I*h/(sqrt(h^2 + 4)*(h^2 + 4))
E'(h) := d/dh(E(h)) → (-(2*I*h^2) + 4*I)/((h^4 + 8*h^2 + 16)*sqrt(h^2 + 4))
E''(h) := d/dh(E'(h)) → (6*I*h^3 - 36*I*h)/((h^6 + 12*h^4 + 48*h^2 + 64)*sqrt(h^2 + 4))
# Die Laterene muss demnach also in einer Höhe von 1.41m befestigt werden, um die maximale Beleuchtungstärke an der Stufenkante P zu erreichen.
E'(h) == 0 solve, h; assume, h > 0; float, 3 → 1.41
E''(sqrt(2)) float → -0.06415002991*I
E''(-sqrt(2)) float → 0.06415002991*I
