# AA 1.2)
# 1)
r := 1
ω := 1
y(t) := r*sin(ω*t)
y(t) == 1 solve, t; assume → π/2
# [plot: y(t) vs t, π/2]
# 2)
v := 10*10^-2 → 1/10  # m/s
λ := 8*10^-2  # m
f := v == λ*f solve, f → 5/4  # Hz
T := λ/T == λ*f solve, T → 4/5  # s
clear(f, T, λ, v)
# 3)
f := 2  # Hz
v := 8  # m/s
λ := 1/4  # m
λ*4 float → 1.0  # m
# 4)
clear(ω, r, f, y, t, λ)
# a)
y(t) := 0.05*sin(8*π*(t - φ/2.5))  # error: Diese Variable ist nicht definiert. Prüfen Sie, ob die Beschriftung richtig festgelegt ist.
r := 0.05  # m  # Amplitude
ω := 8*π  # s^-1  # Kreisfrequenz
f := ω == 2*π*f solve, f → 4  # Hz  # Frequenz
v := 2.5  # m/s  # Fortpflanzungsgeschwindigkeit
λ := v == λ*f solve, λ → 0.625  # m  # Wellenlänge
# b)
clear(ω, r, f, y, t, λ)
y(t) := 0.02*sin(4*π*(t - 2*φ))  # error: Diese Variable ist nicht definiert. Prüfen Sie, ob die Beschriftung richtig festgelegt ist.
r := 0.02  # m  # Amplitude
ω := 4*π  # s^-1  # Kreisfrequenz
f := ω == 2*π*f solve, f → 2  # Hz  # Frequenz
v := 1  # m/s  # Fortpflanzungsgeschwindigkeit
λ := v == λ*f solve, λ → 1/2  # m  # Wellenlänge
# 5)
# a)
λ == v/(2*f)  # die länge wird um 1/2 weniger
# b)
λ == 2*v/f  # die länge wird verdoppelt
# 6)
clear(λ)
v := 334  # m/s
f := 440  # Hz
λ := v == λ*f solve, λ → 167/220  # m
# 7)
clear(λ, v, f, T)
λ := 300  # m
T := 15  # s
v := λ/T → 20  # m/s
