# Physik HÜ 2.1.31)-2.1.35)
# 2.1.31)
m := 250*10^-3  # kg
D := 2*10^-2  # N/m
r_0 := 5*10^-2  # m
w_0 := sqrt(D/m) → sqrt(2)/5  # rad/s
ϕ_0 := -π/2
δ := 0.04*w_0 float, 3 → 0.0113  # 1/s
y(t) := r_0*e^(-δ*t)*sin(sqrt(w_0^2 - δ^2)*t + ϕ_0) float, 3 → 0.05*e^(-0.0113*t)*sin(0.283*t - 1.57)  # cm
# [plot: y(t) vs t]
# 2.1.32)
clear(D, m, ϕ_0, w_0, δ, r_0)
# a)
δ := w_0*x  # error: Diese Variable ist nicht definiert. Prüfen Sie, ob die Beschriftung richtig festgelegt ist.
w_0 := 8
w := w_0*0.9 → 7.2
x := w^2 == w_0^2 - (w_0*x)^2 solve, x; assume, x > 0; float, 2 → 0.44 = 0.44  # %
# b)
clear(x)
w := w_0*0.75 → 6.0
x := w^2 == w_0^2 - (w_0*x)^2 solve, x; assume, x > 0; float, 2 → 0.66 = 0.66  # %
# c)
clear(x)
w := w_0*0.1 → 0.8
x := w^2 == w_0^2 - (w_0*x)^2 solve, x; assume, x > 0; float, 2 → 0.99 = 0.99  # %
# 2.1.33)
m := 10*10^-3  # kg
D := 10  # N/m
r_0 := 8  # m
A := 8*10^-2  # m
w_0 := sqrt(D/m) → 10*sqrt(10)
δ := 2  # 1/s
r(t) := r_0*e^(-δ*t)
T := (2*π)/w float → 7.85398163397
ϕ_0 := π/2
r(5*T) float, 3 → 0.622*10^-33
r(10*T) → 0.483361766266*10^-67
y(t) := r_0*e^(δ*t)*sin(sqrt((w_0^2 - δ^2))*t - ϕ_0) → -(8*e^(2*t)*sin(π/2 - 2*sqrt(249)*t))
# [plot: r(t), y(t) vs t]
# 2.1.34)
# erwünscht:Radio -> Resonanzfunktion wird auf Errergfunktion des gewünschten Senders abgestimmt.
# Ultraschall -> Kleinste Körper werden  zur Resonanz gebracht und zertsört
# Zugenfrequenz
#
# unerwünschte:
# Drehzahl einer Maschine darf niemals der Eigenfrequenz, Eigenschwingung oder Empfängergeschwindigkeit eines Gebäudes übereinstimmen.
# 2.1.35)
s := 20  # m
f := 0.5  # Hz
f_E := s*f → 10.0  # m/s
# Der PKW sollte die Erregerfrequenz 10 m/s vermeiden.
