# Physik HÜ 1.2) 1-5
# 1) a)
m_1 := 35*10^-3 → 7/200  # kg
x := 15*10^-2 → 3/20  # m
F := k*x
F_2 := m_1*9.81
k := F == F_2 solve, k → 2.289
k float, 3 → 2.29  # N/m
# 1) b)
m_2 := 60*10^-3 → 3/50  # kg
T_F := 2*π*sqrt(m_2/k) → 1.01726147428
T_F float, 3 → 1.02  # s
clear(T_F, m_2, k, m_1, F, F_2, x)
# 2) a)
m := 325*10^-3 → 13/40  # kg
F_1 := 0.85  # N
x := 13.5*10^-2 → 0.135  # cm
F_2 := k*x
k := F_1 == F_2 solve, k → 6.2962962963
T_F := 2*π*sqrt(m/k) → 1.42750937872
T_F float, 3 → 1.43  # s
k float, 4 → 6.296  # N/m
# 2) b)
E_pot == E_kin
v := 1/2*k*x^2 == 1/2*m*v^2 solve, v; assume, v > 0 → 0.594202762596
v float, 2 → 0.59  # m/s^2
# 3)
clear(T_F, m_2, k, m_1, F, F_2, x, m)
T := 2*π*sqrt(l/9.81)
l_1 := T == 25/60 solve, l → 0.0431406602227
l_2 := T == 100/60 solve, l → 0.690250563563
l_1/l_2 → 0.0625
# Es muss um ca. 1/16 verkürzt werden.
clear(T_F, m_2, k, m_1, F, F_2, x, m, v)
# 4)
# a)
m := 20  # kg
F := 75  # N
x := 15*10^-2 → 3/20  # m
k := 75/x → 500
T_F := 2*π*sqrt(m/k) → 2*π/5 float, 3 → 1.26  # s
f := 1/T_F float, 2 → 0.79  # Hz
# b)
E_pot := 1/2*k*x^2 float, 3 → 5.63  # J
v := 1/2*k*x^2 == 1/2*m*v^2 solve, v; assume, v > 0 → 3/4  # m/s^2
a := v' == d/dx(v) → v' == 0  # m/s^2
# c)
clear(v, x, k, v')
x := 15*10^-2
A := 7.5*10^-2
k := F/x → 500
ω := sqrt(k/m) → 5
a := -A*ω^2*cos(ω*T_F) float, 3 → -1.87  # m/s^2
v := sqrt((k*x^2 + A^2)/m) float, 3 → 0.75  # m/s
# 5)
clear(T_F, m_2, k, m_1, F, F_2, x, m, v)
l := 10  # m
ω := 0.5  # m
m := 20*10^3  # kg
T_F := 2*π*sqrt(l/9.81) float → 6.34373984922
T_F float, 3 → 6.34  # s
E := 1/2*m*sqrt(m*9.81/l*ω^2/m)^2 float → 2452.5  # J
