# 2.1.39-2.1.42)
# 2.1.39)
r := 5*10^-2  # m
m := 100*10^-3  # kg
k := 2*10  # N/m
w := sqrt(k/m) → 10*sqrt(2)
v_max := m*v_max^2/2 == m*(w*r)^2/2 solve, v_max; float; assume, v_max > 0 → 0.707106781187
v_max := 0.71  # m/s
T := 2*π*sqrt(m/k) float → 0.444288293816  # s
v(t) := r*sin(w*t)
E_kin(t) := k/2*v(t)^2
# [plot: v(t), E_kin(t) vs t]
clear(r, m, v_max, y, w)
# 2.1.40)
r := 10*10^-2  # m
m := 10*10^-2  # kg
v_max := 5*10^-2  # m/s
v(t) := r*sin(w*t)  # error: Diese Variable ist nicht definiert. Prüfen Sie, ob die Beschriftung richtig festgelegt ist.
# 2.1.41)
E_ges := E_kin(t) + E_el(t) == 2*π^2*m*f^2*r^2  # error: Diese Variable ist nicht definiert. Prüfen Sie, ob die Beschriftung richtig festgelegt ist.
# Aufgrund der Energieerhaltungsgesetzte  ist Ekin(t) + Eel(t) die Gesamtenergie.  Eges ist auch proportional zu m, f^2, r^2
# 2.1.42)
m := 1
# kg
T := 1  # s
A := 1*10^-1  # m
f := 1/T → 1  # Hz
E_ges := 2*π^2*m*f^2*r^2 float, 3 → 0.197  # J
v(t) := A*2*π*cos(2*π*t) → π*cos(2*t*π)/5
E_kin(t) := A*π*cos(2*π*t) → π*cos(2*t*π)/10
# [plot: v(t), E_kin(t) vs t]
