# 5.69) 1-2)
f(x) := a*x^2 + b*x + d  # error: Diese Variable ist nicht definiert. Prüfen Sie, ob die Beschriftung richtig festgelegt ist.
f'(x) := d/dx(f(x)) → 2*a*x + b
P := [-2; y_Q]  # error: Diese Variable ist nicht definiert. Prüfen Sie, ob die Beschriftung richtig festgelegt ist.
# 2: Bedingungen
# I: f(3) = 0
# II: f'(-2) = -2
# III: f'(3) = 0
[a, b, d] := [f(3) == 0; f'(-2) == -2; f'(3) == 0] → [d + 3*b + 9*a == 0; b - 4*a == -2; b + 6*a == 0] solve, a, b, d → [1/5, -6/5, 9/5]
# Funktionsgleichung
f(x) := a*x^2 + b*x + d expand → x^2/5 - 6*x/5 + 9/5
# Grafik
# [plot: f(x) vs x]
clear(a, b, d, f)
# 5.72 a)
f(x) := a*x^3 + b*x^2 + c*x + d  # error: Diese Variable ist nicht definiert. Prüfen Sie, ob die Beschriftung richtig festgelegt ist.
E_1 := [0; 0]
E_2 := [4; 4]
# Bedingungen:
# I: f'(0) = 0
# II: f'(4) = 0
# III: f(4) = 4
# IIII: f(0) = 0
f'(x) := d/dx(f(x)) → 3*a*x^2 + 2*b*x + c
f''(x) := d/dx(f'(x)) → 6*a*x + 2*b
[a, b, c, d] := [f'(0) == 0; f'(4) == 0; f(4) == 4; f(0) == 0] → [c == 0; c + 8*b + 48*a == 0; d + 4*c + 16*b + 64*a == 4; d == 0] solve, a, b, c, d → [-1/8, 3/4, 0, 0]
f(x) := a*x^3 + b*x^2 + c*x + d expand → -x^3/8 + 3*x^2/4
clear(a, b, c, d)
# 5.72 b)
E := [0; 0]
W := [1; 3]
f(0) → 0
# Bedingungen:
# I: f(0) = 0
# II: f'(0) = 0
# III: f''(1) = 0
# IIII: f(1) = 3
f'(0) → c
f'(x) := d/dx(f(x)) → (-(3*x^2) + 12*x)/8
[a, b, c, d] := [f(0) == 0; f'(0) == 0; f''(1) == 0; f(1) == 3] solve, a, b, c, d →  # error: Keine Lösung gefunden.
f(x) := a*x^3 + b*x^2 + c*x + d  # error: Diese Variable ist nicht definiert. Prüfen Sie, ob die Beschriftung richtig festgelegt ist.
