# 5.108) 1-2
A(x, y) := x*y
Y := (x - 0.04)*(y - 0.06) == 1.5 solve, y → (0.06*x + 1.4976)/(x - 0.04)
# Nebenbedingung
A(x) := A(x, Y) → x*(0.06*x + 1.4976)/(x - 0.04)
A'(x) := d/dx(A(x)) float, 4 → -1.0*0.06/(x^2 - 0.08*x + 0.0016) + 0.06
E := A'(x) == 0 solve, x → [1.04; -0.96]
NB(x, y) := (x - 0.04)*(y - 0.06) == 1.5
NB(E[0], y) solve, y → 1.56  # Das Plakat ist 104cm breit und 156cm hoch.
# 2)
# Beispiel 3) Extremwertaufgaben
