# Bsp's  5.76a, 5.75, 5.79 1-4)
# 5.76a)
f(x) := (a*x)/(x^2 + b)  # error: Diese Variable ist nicht definiert. Prüfen Sie, ob die Beschriftung richtig festgelegt ist.
f'(x) := d/dx(f(x)) → (-(a*x^2) + a*b)/(x^4 + 2*b*x^2 + b^2)
f''(x) := d/dx(f'(x)) → (2*a*x^3 - 6*a*b*x)/(x^6 + 3*b*x^4 + 3*b^2*x^2 + b^3)
# Bedingungen:
# I:f''(4)=0
# II:f(4)=5
[a, b] := [f''(4) == 0; f(4) == 5] solve, a, b → [80/3, 16/3]
f(x) := (a*x)/(x^2 + b) expand → 80*x/(3*x^2 + 16)
f'(x) := d/dx(f(x)) → (-(240*x^2) + 1280)/(9*x^4 + 96*x^2 + 256)
f''(x) := d/dx(f'(x)) → (1440*x^3 - 23040*x)/(27*x^6 + 432*x^4 + 2304*x^2 + 4096)
# Definitonsmenge:
# D=R, stetig,ungerade,keine Polstellen,keine Lücken
# Wendepunkte:
W := f''(x) == 0 solve, x → [0; 4; -4]
W_1 := [W[0]; f(W[0])] → [0; 0]
W_2 := [W[1]; f(W[1])] → [4; 5]
W_3 := [W[2]; f(W[2])] → [-4; -5]
# Wendetangenten
k_1 := f'(W_1[0]) → 5
k_2 := f'(W_2[0]) → -5/8
k_3 := f'(W_3[0]) → -5/8
d_1 := W_1[1] == k_1*W_1[0] + d_1 solve, d_1 → 0
d_2 := W_2[1] == k_2*W_2[0] + d_2 solve, d_2 → 15/2
d_3 := W_3[1] == k_3*W_3[0] + d_3 solve, d_3 → -15/2
t_1(x) := k_1*x + d_1 → 5*x
t_2(x) := k_2*x + d_2 → -5*x/8 + 15/2
t_3(x) := k_3*x + d_3 → -5*x/8 - 15/2
# Verhalte im Unendlichen
limit(f(x), x → ∞) → 0
limit(f(x), x → -∞) → 0
# Nullstellen
f(x) == 0 solve, x → 0
N := [0; f(0)] → [0; 0]
# Extremstellen
E := f'(x) == 0 solve, x → [-(4*sqrt(3))/3; 4*sqrt(3)/3] = [-2.3094; 2.3094]
P_1 := f''(E[0]) float → 1.08253175473
P_2 := f''(E[1]) float → -1.08253175473
T := [E[0]; f(E[0])] float, 3 → [-2.31; -5.77]
H := [E[1]; f(E[1])] float, 3 → [2.31; 5.77]
# Monotonie
# streng monoton fallend:
# ]-∞,-2.31[ und ]2.31,∞[
# streng monoton steigend:
# ]-2.31,2.31[
# Grafik
# [plot: f(x), W_1[1], W_2[1], W_3[1], t_1(x), t_2(x), t_3(x), H[1], T[1] vs x, W_1[0], W_2[0], W_3[0], H[0], T[0]]
# 5.75)
clear(a, b, c, d, f)
y(x) := a*x^2 + b*x + c  # error: Diese Variable ist nicht definiert. Prüfen Sie, ob die Beschriftung richtig festgelegt ist.
P := [20; 16]
Q := [50; 8]
# Bedingungen:
# I: y(20)=16
# II: y(50)=8
# III: y'(20)=16/20
y'(x) := d/dx(y(x)) → 2*a*x + b
y''(x) := d/dx(y'(x)) → 2*a
[a, b, c] := [y(20) == 16; y(50) == 8; y'(20) == 16/20] solve, a, b, c, d → [-8/225, 20/9, -128/9, 0]
y(x) := a*x^2 + b*x + c expand → -8*x^2/225 + 20*x/9 - 128/9
# Grafik
# [plot: y(x) vs x]
clear(y, f, a, b, c, d)
# 5.79)1-4)
f(x) := a*x^3 + b*x^2 + c*x + d  # error: Diese Variable ist nicht definiert. Prüfen Sie, ob die Beschriftung richtig festgelegt ist.
f'(x) := d/dx(f(x)) → 3*a*x^2 + 2*b*x + c
# Bedingungen:
# I:f(12)=3
# II: f'(12)=0
# III: f(0)=0
# IIII: f'(0)=0
f''(x) := d/dx(f'(x)) → 6*a*x + 2*b
[a, b, c, d] := [f(12) == 3; f'(12) == 0; f(0) == 0; f'(0) == 0] solve, a, b, c, d → [-1/288, 1/16, 0, 0]
f(x) := a*x^3 + b*x^2 + c*x + d expand → -x^3/288 + x^2/16
# 2)
f'(x) := d/dx(f(x)) → -x^2/96 + x/8
10 yd = 9.144 m
f(9.144) = 2.57109
# Der Ball fliegt 2.57m hoch.
# 3)
f(x) == 2 solve, x; float → [15.6474772975; -5.00391958022; 7.35644228274]
# Der Ball wurde aus einer Entfernung von 15.65 vor der Torlinie abgefeuert.
# 4)
f(x) == 0 solve, x → [0; 0; 18]
18 - 15.64 → 2.36
f'(18) float → -1.125
α := atan(f'(18)) = -48.3665 deg
# Der Ball trifft den Boden mit einem Winkel von 45.36 Grad und 2.36m hinter der Torlinie.
# Grafik
# [plot: f(x) vs x]
