# Bsp 5.72c)
f(x) := 1*x^3 + b*x^2 + c*x + d  # error: Diese Variable ist nicht definiert. Prüfen Sie, ob die Beschriftung richtig festgelegt ist.
S := [1; 4]
a := 1
f'(x) := d/dx(f(x)) → 3*x^2 + 2*b*x + c
# Bedingungen:
# I: f(1) = 4
# II: f''(1) = 0
# III: a = 1
# IIII: f'(1) = 0
f''(x) := d/dx(f'(x)) → 6*x + 2*b
[b, c, d] := [f(1) == 4; f''(1) == 0; f'(1) == 0] → [d + c + b + 1 == 4; 2*b + 6 == 0; c + 2*b + 3 == 0] solve, b, c, d → [-3, 3, 3]
f(x) := a*x^3 + b*x^2 + c*x + d → x^3 - 3*x^2 + 3*x + 3
clear(a, b, c, d)
# Bsp 5.72d)
f(x) := a*x^3 + b*x^2 + c*x + d  # error: Diese Variable ist nicht definiert. Prüfen Sie, ob die Beschriftung richtig festgelegt ist.
P := [-1; -10]
# Bedingungen:
# I: f'(1) = -3
# II: f'(-1) = 1
# III: f(-1) = -10
# IIII: f(1) = -4
R := [1; -4]
p := 45 deg = 0.785398
k_1 := tan(p) → 1
# tan(45)=k
[a, b, c, d] := [f'(1) == -3; f'(-1) == 1; f(-1) == -10; f(1) == -4] → [c + 2*b + 3 == -3; c + (3 - 2*b) == 1; d + (b - a - c) == -10; d + c + b + a == -4] solve, a, b, c, d → [7, -1, -4, -6]
f(x) := a*x^3 + b*x^2 + c*x + d → 7*x^3 - x^2 - 4*x - 6
clear(a, b, c, d)
# 5.78a)
f(x) := a*x^3 + b*x^2 + c*x + d  # error: Diese Variable ist nicht definiert. Prüfen Sie, ob die Beschriftung richtig festgelegt ist.
α := 20 deg
k := tan(α) → tan(20*deg)
# Bedingungen:
# I: f(0)=1.3
# II: f'(0)= tan(20deg)
# III: f(12) = 4.8
# IIII: f'(14) = 0
f'(x) := d/dx(f(x)) → 3*a*x^2 + 2*b*x + c
[a, b, c, d] := [f(0) == 1.3; f'(0) == k; f(12) == 4.8; f'(14) == 0] solve, a, b, c, d; float, 5 → [0.005291*tan(20.0*deg) - 0.0027006, -0.14683*tan(20.0*deg) + 0.056713, tan(20.0*deg), 1.3]
f(x) := a*x^3 + b*x^2 + c*x + d → x^3*(0.005291*tan(20.0*deg) - 0.0027006) + x^2*(0.056713 - 0.14683*tan(20.0*deg)) + x*tan(20.0*deg) + 1.3
# 1)
y(x) := -0.0008*x^3 + 0.003*x^2 + 0.363*x + 1.3
y(4) → 2.7488
# Die Scheibe ist nach 4m Höhe 2.7488m entfernt .
# 2)
y'(x) := d/dx(y(x)) → -0.0024*x^2 + 0.006*x + 0.363
y''(x) := d/dx(y'(x)) → -0.0048*x + 0.006
E := y'(x) == 0 solve, x; assume, x > 0 → 13.6117353151
y(E) → 4.77931928454
H := [E; y(E)] float, 6 → [13.6117; 4.77932]
# 3)
y(x) == 0 solve, x; float → [24.7429037294; -17.1672918247; -3.82561190464]
# Nach 24.74 m trifft die scheibe auf dem Boden auf.
# 4)
y(x) == 0.9 solve, x; float → [23.7455778887; -18.8803128869; -1.11526500181]
# Wenn er sie in einer Höhe von 0,9m fängt ist der Hund 23.74m von der Scheibe entfernt.
