# 5.102
# Hauptbedingung:(Tragfähigkeit)
# T(b,h) = b * h^2
# -----------------------------------
# Nebenbedingung:
# d =sqrt(h^2 + b^2)
T(b, h) := b*h^2
H(b) := 65 == sqrt(h^2 + b^2) solve, h → [sqrt(-b^2 + 4225); -sqrt(-b^2 + 4225)]
60 == sqrt(h^2 + b^2)
T(b) := T(b, H(b)) → [b*(-b^2 + 4225); b*(-b^2 + 4225)]
# Ableitungen:
T'(b) := d/db(T(b)) → [-(3*b^2) + 4225; -(3*b^2) + 4225]
T''(b) := d/db(T'(b)) → [-(6*b); -(6*b)]
B := T'(b) solve, b; float, 5 → [-37.528; 37.528]
B := B[0] → -37.528
T''(B) float, 5 → [225.17; 225.17]
H(B) float, 5 → [53.072; -53.072]
# A: Die Fläche muss 37.53 cm breit sein und 53.07 cm hoch sein.
# Bsp 9:
# Hauptbedingung: W(b,h) = 1/σ*b*h^2
# Nebenbedingung: 46 = sqrt(h^(2^□)*b^(2^□))
W(b, h) := 1/σ*b*h^2
d == sqrt(h^2*b^2) → d == sqrt(b^2*h^2)
H(b) := d == sqrt(h^2 + b^2) solve, h → [sqrt(d^2 - b^2); -sqrt(d^2 - b^2)]
W(b) := W(b, H(b)) → [b*(d^2 - b^2)/σ; b*(d^2 - b^2)/σ]
W'(b) := d/db(W(b)) → [(d^2 - 3*b^2)/σ; (d^2 - 3*b^2)/σ]
B := W'(b) == 0 solve, b → [-sqrt(3*d^2)/3; sqrt(3*d^2)/3]
W'' := d/db(W'(b)[0]) → -(6*b)/σ
H := H(B[1]) assume, ALL > 0 → [sqrt(6)*d/3; -(sqrt(6)*d)/3]
h := (sqrt(6)*46)/3 float, 5 → 37.559
b := sqrt(3*46^2)/3 float, 5 → 26.558
# Die allgemeinen Formen für die Höhe und die Breite sind:
#
# Breite: B[1] → sqrt(3)*sqrt(d^2)/3
#
# Höhe: H[0] → sqrt(6)*d/3
# Somit wären die Maße für die Maximale Tragkraft:
# b = 26.59 cm
# h = 37.56cm
# Bsp 10)
# Bedingungen:
#
# Hauptbedingung:
# A = ((π*r^(2^□))/2 + 2*r*l)
#
# Nebenbedingung:
# U = (π*r + 2*l + 2*r)
clear(r, l, A, U)
A(r, l) := (π*r^2)/2 + l*(2*r)
L(r) := U == π*r + 2*l + 2*r solve, l → (-(r*π) + (U - 2*r))/2
A(r) := A(r, L(r)) → r^2*π/2 + r*(U - 2*r - r*π)
A'(r) := d/dr(A(r)) → -(r*π) + (U - 4*r)
R := A'(r) == 0 solve, r → U/(π + 4)
# Die Höhe und Breite des Fensters betragen:
# h: R*2 → 2*U/(π + 4)
# b: R*2 → 2*U/(π + 4)
# 5.105
# Hauptbedingung:
#
# K(x,y) = 10000 * (8-x) + y*30000
#
# Nebenbedingung:
#
# 1 = sqrt(y^2 - x^2)
K(x, y) := 10000*(8*x) + y*30000
Y(x) := 1 == sqrt(y^2 + x^2) solve, y → [sqrt(-x^2 + 1); -sqrt(-x^2 + 1)]
Y(x) := Y(x)[0]
K(x) := K(x, Y(x)) → 30000*sqrt(-x^2 + 1) + 80000*x
K'(x) := d/dx(K(x)) → -30000*x/sqrt(-x^2 + 1) + 80000
K''(x) := d/dx(K'(x)) → 30000/((x^2 - 1)*sqrt(-x^2 + 1))
X := K'(x) == 0 solve, x; float, 3 → 0.936
Y(X) → 0.352
# A: Die angegebene Länge x müsste 0.94 km entfernt sein. Nach 8 - X → 7.064 km müsste y abzweigen,welches die Länge Y(X) float, 2 → 0.35km hat. Mit diesen Maßen wären die Verlegegungskosten minimal.
