# Aufgabe 5.24) a)
y(t) := -t^3 + t^2
# Ableitungen
# Erste Ableitung
y'(t) := d/dt(y(t)) → -(3*t^2) + 2*t
# Zweite Ableitung
y''(t) := d/dt(y'(t)) → -(6*t) + 2
# Dritte Ableitung
y'''(t) := d/dt(y''(t)) → -6
# (0, 1) Definitionsbereich, Nullstellenanalyse,Extremstellen,Wendestellen, Polstellen, Lücken Stetigkeit,Asymptotisches Verhalten
# Nullstellen
# Es sind Maximal 3 Nullstellen möglich, da es sich um eine Funktion dritten Grades handelt.
# Extremstellen
# Die erste Ableitung ist eine Funktion 2ten Grades, daher besitzt die Funktion 2 Extrempunkte.
# Wendestellen
# Die zweite Ableitung ist eine Funktion 1ten Grades, daher besitzt die Funktion 1 Wendepunkt.
# Es handelt sich um eine ungerade Funktion, aufgrund des ungeraden Grades.
# Definitionsbereich
# D=R
# Stetigkeit
# Stetig, keine Polstellen, keine Lücken
# (2) Asymptotisches Verhalten
limit(y(t), t → ∞) → -∞
limit(y(t), t → -∞) → ∞
# Nullstellen
# Bennung mit _ALL, da man eine ART-Liste der X-Werte bekommt --> Sammlung --> ALL
N_ALL := y(t) == 0 solve, t; assume, t == real → [0; 0; 1]
N_1 := [N_ALL[1]; 0] → [0; 0]
N_2 := [N_ALL[2]; 0] → [1; 0]
# Extremstellen
E_ALL := y'(t) == 0 solve, t; assume, t == real → [0; 2/3]
# Ermittlung ob Hoch oder Tiefpunkt durch einsetzten in die zweite Ableitung
T_1 := [E_ALL[0]; y(E_ALL[0])] → [0; 0]
H_1 := [E_ALL[1]; y(E_ALL[1])] → [2/3; 4/27]
y''(E_ALL[1]) = -2
# Wendestellen, Wendetangenten
W_ALL := y''(t) == 0 solve, t → 1/3
W_1 := [W_ALL; y(W_ALL)] → [1/3; 2/27]
k_1 := y'(W_1[0]) → 1/3
d_1 := W_1[1] == k_1*W_1[0] + d_1 solve, d_1 → -1/27
t_1(x) := k_1*x + d_1
# Monotonieverhalten
# Streng monoton fallend: ]-∞, 0 .. □[ und ]0.6, ∞ .. □[
# Streng monoton steigend: ]0, 0.6 .. □[
# Graphische Darstellung
# [plot: y(t), W_1[1], N_ALL[1], N_2[1], t_1(t) vs t, W_1[0], N_ALL[0], N_2[0]]
# Aufgabe 5.24) b)
y(t) := 1/30*t^5 - 1/2*t^3
# Ableitungen
y'(t) := d/dt(y(t)) → (t^4 - 9*t^2)/6
y''(t) := d/dt(y'(t)) → 2*t^3/3 - 3*t
y'''(t) := d/dt(y''(t)) → 2*t^2 - 3
# (0, 1) Definitionsbereich, Nullstellenanalyse,Extremstellen,Wendestellen, Polstellen, Lücken Stetigkeit,Asymptotisches Verhalten
# Definitionsbereich
# D = R
# Nullstellenanalyse
# Die Funktion besitzt maximal 5 Nullstellen, da diese vom Grad 5 ist.
# Extremstellen
# Die Funktion besitzt 4 Extremstellen, da die erste Ableitung eine Funktion 4ten Grades ist.
# Wendestellen
# Die Funktion besitzt 3 Wendestellen, da deren 2te Ableitung vom 3ten Grad ist.
# Stetigkeit, Polstellen, Lücken
# Die Funktion besitzt keine Polstellen und ist stetig und und hat keine Lücken.
# (2) Asymptotisches Verhalten
limit(y(t), t → ∞) → ∞
limit(y(t), t → -∞) → -∞
# (3) Berechnung der Nullstellen
N_ALL := y(t) == 0 solve, t; assume, t == real → [0; 0; 0; sqrt(15); -sqrt(15)]
N_1 := [N_ALL[0]; y(0)] = [0; 0]
N_3 := [N_ALL[4]; y(0)] = [-3.87298; 0]
N_2 := [N_ALL[3]; y(0)] = [3.87298; 0]
# Extremstellen
E_ALL := y'(t) == 0 solve, t; assume, t == real → [0; 0; 3; -3]
T_1 := [E_ALL[0]; y(E_ALL[0])] = [0; 0]
T_2 := [E_ALL[2]; y(E_ALL[2])] = [3; -5.4]
H_3 := [E_ALL[3]; y(E_ALL[3])] = [-3; 5.4]
P_1 := y''(E_ALL[0]) = 0
P_2 := y''(E_ALL[2]) = 9
P_3 := y''(E_ALL[3]) = -9
# Wendestellen und Wendetangente
W_ALL := y''(t) == 0 solve, t; assume, t == real → [0; 3*sqrt(2)/2; -(3*sqrt(2))/2]
W_1 := [W_ALL[0]; y(W_ALL[0])] = [0; 0]
y'''(W_ALL[0]) = -3
y'''(W_ALL[1]) = 6
k_1 := y'(W_ALL[0]) = 0
W_2 := [W_ALL[1]; y(W_ALL[1])] = [2.12132; -3.34108]
y'''(W_ALL[2]) = 6
k_2 := y'(W_ALL[1]) = -3.375
k_3 := y'(W_ALL[2]) = -3.375
W_3 := [W_ALL[2]; y(W_ALL[2])] = [-2.12132; 3.34108]
d_1 := W_1[1] == k_1*W_1[0] + d_0 solve, d_0 → 0
d_2 := W_2[1] == k_2*W_2[0] + d_2 solve, d_2 → 3.81837661841
d_2 = 3.81838
d_3 := W_3[1] == k_3*W_3[0] + d_3 solve, d_3 → -3.81837661841
d_3 = -3.81838
t_1(x) := k_1*x + d_1 → 0
t_3(x) := k_3*x + d_3
t_2(x) := k_2*x + d_2 → -3.375*x + 3.81837661841
# Montonie
# Streng monoton steigen: ]-∞, -3 .. □[ und ]3, ∞ .. □[
# Streng monoton fallend: ]-3, 0 .. □[ und ]0, 3 .. □[
# Graphische Darstellung
# [plot: y(t), t_1(x), t_2(x), t_3(x), W_1[1], W_2[1], W_3[1], N_1[1], N_2[1], N_3[1] vs t, x, W_1[0], W_2[0], W_3[0], N_1[0], N_2[0], N_3[0]]
