# 1.190)
# a) | Z = K * t * i / (100*360)
K[0] := 300.00
Z := 40.45
t := 250
40.45 == (K[0]*t*i)/(100*360) solve, i → 19.416
# Der Zinssatz beträgt 19.4%
clear(i, K, t_Y, Z)
# b)
# Z = K * t * i / (100*360)
Z := 21.25
i := 1.575
t := 265
K := Z/(t*i)*100*360 → 1832.88409704
K*100 = 183288  # Das Kapital beträgt 1832.90€
# c)
clear(t_Y, K, i, Z)
K := 150
i := 1.785
# Z = K * t * i / 100
Z := 3.00
t := Z/(K*i)*100*360 → 403.361344538
# Die Verzinssungsdauer beträgt 403.361 Tage.
clear(K, i, Z, t)
# d)
Z := 3540
t := 4
i := 4.75  # Z = K * t * i /( 100 * 12)
K := Z/(t*i)*100*12 → 223578.947368
# Das Kapital beträgt 223578.95€
# 1.191)
K[0] := 1000
i := 0.03125
n := 0, 1 .. 10
K[n] := K[0]*(1 + i*0.75)^n → 1000.0*1.0234375^n
K[2] → 1047.42431641  # KEST in Österreich 25% somit 0.75.
K_o := K[2] - 250 → 797.424316406
K[2] := K_o*(1 + i*0.75)^2 → 835.241619498
# Das Endkapital beträgt K[2] float, 5 → 835.24€.
# 1.192)
# Angebot 1) | Angebot 2)
B_1 := 20000
R := 800
q := 1.05
B_nach := R*(q^20 - 1)/(q - 1)*1/q^20 → 9969.76827403
# Das Angebot 1 wäre rentabler als das zweite da dieses ca. um die hälfte geringer ist als das erste.
# 1.193)
# a)
Y[0] := 2
n := 0, 1 .. 5
Y[n + 1] := 1.2*Y[n] - 3
# [plot: Y[n] vs n]
Y[n] → [2; -0.6; -3.72; -7.464; -11.9568; -17.34816]
# Divergent
# b)
Y[0] := 6
Y[n + 1] := 0.4*(4 - Y[n])
# [plot: Y[n] vs n]
Y[n] → [6; -0.8; 1.92; 0.832; 1.2672; 1.09312]
# Konvergent
# 1.194)
# 1)
Y[0] := 1
q := 51
Y[n + 1] := Y[n]*51
Y[n] := 51^n*Y[0]
# 2)
# [plot: Y[n] vs n]
# 3)
anz := (148.9*10^3*10^6)/(10*10^2) → 148900000.0
anz == (51^n)/10^9 solve, n → [10.0569188535; 10.0569188535; 10.0569188535; 10.0569188535; 10.0569188535; 10.0569188535]
# Die Nachkommen und das Weibchen würden nach ca. 10.06 Jahren die komplette Landfläche der Erde bedecken.
clear(Y, n)
# 4)
Y[0] := 1
n := 0, 1 .. 5
Y[n + 1] := 51*Y[n] - 25
Y[n] := 51^n - 25
# [plot: Y[n] vs n]
