# 66te Schulübung am 26.04.2023
# Beispiel 1: Berechnen Sie den Flächeninhalt jenes Flächenstücks das den Graphen, f mit f(x)= x+1 und g mit g(x)= 0.5*x^2-3
f(x) := x + 1
g(x) := 1/2*x^2 - 3
# Graph
# [plot: f(x), g(x) vs x]
# Integral = str + shift + I
# Schnittpunkte berechnen = FUNKTIONEN GLEICHSETZEN
S := f(x) == g(x) solve, x → [4; -2]
S[0] → 4
S[1] → -2
Fläche := integral(f(x) - g(x), x = -2 .. 4) → 18  # FE oder E^2
clear(f)
# Beispiel 2)
# Eine Parabel 4ter ordnung hat in W[0] einen Wendepunkt mit der X-Achse als Wendetangente und im Punkt N(-4, 0) einen weiteren Schnittpunkt mit der x-Achse. Die Fläche die, die Kurve begrenzt, hat den Flächeninhalt 12,8. Bestimmen Sie die Funktionsgleichung und fertigen Sie eine Skizze an
f(x) := a*x^4 + b*x^3 + c*x^2 + d*x + e_1  # error: Diese Variable ist nicht definiert. Prüfen Sie, ob die Beschriftung richtig festgelegt ist.
# Bedienungen:
# I: f(0) == 0
# II: f'(0) == 0
# III: f''(0) == 0
# IV: f(-4) == 0
# V: integral(f(x), x = -4 .. 0) == 128/10
f'(x) := d/dx(f(x)) → 4*a*x^3 + 3*b*x^2 + 2*c*x + d
f''(x) := d/dx(f'(x)) → 12*a*x^2 + 6*b*x + 2*c
[a, b, c, d, e_1] := [f(0) == 0; f'(0) == 0; f''(0) == 0; f(-4) == 0; integral(f(x), x = -4 .. 0) == 128/10] solve, a, b, c, d, e_1 → [-1/4, -1, 0, 0, 0]
f(x) := a*x^4 + b + x^3 + c*x^3 + d*x^2 + e_1
# [plot: f(x) vs x]
# Beispiele:
# 7.6a-c)
# 7.18) a-b)
# 7.22)
# 7.6a-c)
integral(g(x) - f(x), x = x1 .. x3)
integral(f(x) - g(x), x = a .. b) + integral(g(x) + f(x), x = b .. c)
integral(f(x) - h(x), x = a .. b) + integral(g(x) - h(x), x = b .. c) == integral(f(x), x = b .. a) - integral(h(x), x = a .. c)
# 7.18a)
f(x) := 2/x^2
g(x) := -x^2 + 3
S := f(x) == g(x) solve, x → [1; -1; sqrt(2); -sqrt(2)]
# [plot: f(x), g(x) vs x]
