# 7.68)
f(x) := 2*x + 1
g(x) := x^2 + 1
# Skizze:
# [plot: f(x), g(x), f(x) - g(x), g(x) - f(x) vs x]
S := f(x) == g(x) solve, x → [0; 2]
# gegeben:
V_xgeg := π*(integral(f(x), x = 0 .. 2) - integral(g(x), x = 0 .. 2))^2 float, 3 → 5.59
# korrigiert:
V_x := π*(integral(f(x)^2, x = 0 .. 2) - integral(g(x)^2, x = 0 .. 2)) float, 3 → 21.8
# 7.104)
a(t) := -1.2*t^2 + 2.4*t
# Lösung:
(a)
# [plot: a(t) vs t]
